# AguaClara Water Treatment Plants
# Automated Design
# User Inputs:
# Design References
# [reference: UserInputs- 1m deep.xmcd]
# [reference: DesignAssumptions-1m deep.xmcd]
# [reference: MathFunctions.xmcd]
# [reference: PipeDatabase.xmcd]
# [reference: MinorLossCoefficients.xmcd]
# [reference: FluidsFunctions.xmcd]
# Inlet Channel:
# [reference: Inlet Channel.xmcd]
W_InletChannel = 0.281424 m
L_Channel = 3.6504 m
ND_SedPipeEntrance = 8 in
# Sedimentation Tanks:
# [reference: Sedimentation.xmcd]
H_SedBelowSlope = 0.6 m
H_SedBelowStraight = 0 m
H_SedAbove = 0.12 m
H_SedPlate = 0.48 m
HW_Sed = 1.2 m
H_Sed = 1.3 m
Z_Mp = 0.75 m
L_Sed = 2.65753 m
L_SedPlate = 0.554256 m
N_SedPlates = 57
AN_SedPlate = 60 deg
V_SedC = 9.89992 m/day
V_SedUp = 64.3373 m/day
# Sedimentation Tank Inlet Slopes:
# [reference: Sed. Inlet Slopes.xmcd]
B_SedInlet = 3.53783 cm
AN_SedTopInlet = 48.3629 deg
AN_SedBottom = 10 deg
A_SedInlet = 1349.36 cm^2
A_SedInletMin = 54.1327 cm^2
H_SedTopInlet = 0.6 m
H_SedBottom = 0.0940528 m
# Exit Channel:
# [reference: Exit Channel.xmcd]
W_ExitChannel = 0.281424 m
H_ExitChannel = 0.55 m
L_ExitChannel = 3.6504 m
# Flow Controller:
# [reference: FCM.xmcd]
N_Fcm = 1
ID_FcmTube = 3.175 mm
ID_FcmTube = 0.125 in
L_FcmTube = 99.0625 cm
Q_FcmTubeMax = 285 mL/min
HL_FcmValve = 15.0907 cm
# Flocculator:
# [reference: Flocculation.xmcd]
W_FlocChannel = 0.5334 m
S_FlocBaffle = [0.0669468; 0.0821572; 0.136655; 0.334734] m
B_FlocBaffle = [0.0869468; 0.102157; 0.156655; 0.354734] m
N_FlocBafflesMin = 38
HL_Floc = 8.45648 cm
X_FlocBaffles = [
    0.2286, 2.3078, 0.349734;
    0.315547, 2.15115, 0.704468;
    0.402494, 1.99449, 1.0592;
    0.48944, 1.83784, 1.41394;
    0.576387, 1.68118, 1.76867;
    0.663334, 1.52453, 2.1234;
    0.750281, 1.16979, 0;
    0.837228, 0.81506, 0;
    0.924174, 0.460326, 0;
    1.02633, 0, 0;
    1.12849, 0, 0;
    1.23065, 0, 0;
    1.3328, 0, 0;
    1.43496, 0, 0;
    1.53712, 0, 0;
    1.63927, 0, 0;
    1.74143, 0, 0;
    1.89809, 0, 0;
    2.05474, 0, 0;
    2.2114, 0, 0
] m
HW_FlocStart = 1.28456 m
W_FlocPort = 0.334734 m
L_FlocBaffles = [
    1.13305, 1.06335, 0.865266;
    1.31762, 1.24791, 1.04983;
    1.13305, 1.06335, 0.865266;
    1.31762, 1.24791, 1.04983;
    1.13305, 1.06335, 0.865266;
    1.31762, 1.24791, 1.04983;
    1.13305, 0.865266, 0;
    1.31762, 1.04983, 0;
    1.13305, 0.865266, 0;
    1.30241, 0, 0;
    1.11784, 0, 0;
    1.30241, 0, 0;
    1.11784, 0, 0;
    1.30241, 0, 0;
    1.11784, 0, 0;
    1.30241, 0, 0;
    1.11784, 0, 0;
    1.24791, 0, 0;
    1.06335, 0, 0;
    1.24791, 0, 0
] m
H_FlocPort = 0.5334 m
N_FlocBaffles = 35
Z_FlocBaffles = [
    0, 0, 0;
    0.0669468, 0.136655, 0.334734;
    0, 0, 0;
    0.0669468, 0.136655, 0.334734;
    0, 0, 0;
    0.0669468, 0.136655, 0.334734;
    0, 0, 0;
    0.0669468, 0.334734, 0;
    0, 0, 0;
    0.0821572, 0, 0;
    0, 0, 0;
    0.0821572, 0, 0;
    0, 0, 0;
    0.0821572, 0, 0;
    0, 0, 0;
    0.0821572, 0, 0;
    0, 0, 0;
    0.136655, 0, 0;
    0, 0, 0;
    0.136655, 0, 0
] m
Gt_FlocMinFlow = 4670.93
# Entrance Tank:
# [reference: EntranceTank.xmcd]
ND_Lfom = 6 in
HL_Rm = 4.20427 cm
N_Lfom = 1
D_LfomOrifices = 18 mm
Q_LfomErrorMax = 1.15498 %
N_LfomOrifices = [5; 5; 3; 2; 2; 2; 1; 2; 2; 0]
L_Et = 1.04775 m
W_Et = 1.04775 m
HW_Et =  # error: This variable is undefined.
H_Et =  # error
# Sedimentation Tank Effluent Launder:
# [reference: Launder.xmcd]
N_SedLaunderOrifices = 38
Q_SedLaunderOrifices = 3.33333 L/min
Z_SedLaunder = 1.14 m
ND_SedLaunder = 4 in
D_SedLaunderOrifice = 9 mm
# Plant Leveling Tank:
# [reference: PlantLevelTank.xmcd]
HW_Plt =  # error
ND_PltWeir = 0.1524 m
H_PltWeir =  # error
H_Plt =  # error
W_Plt = 0.2564 m
# Sedimentation Tank Sludge Drain:
# [reference: SludgeDrain.xmcd]
N_SedSludgeOrifices = 26
ND_SedSludge = 2 in
Q_SludgeDrainInitial = 226.805 L/min
D_SedSludgeOrifice = 6 mm
# Any additional needed elevations should be calculated in the files above.
# AutoCAD References
# [reference: basics.xmcd]
# [reference: pipe.xmcd]
# [reference: tank.xmcd]
# [reference: lamina.xmcd]
# [reference: cross.xmcd]
# [reference: Tee.xmcd]
# [reference: elbow.xmcd]
# [reference: Sludge.xmcd]
# [reference: Channel.xmcd]
# [reference: Manifold.xmcd]
# [reference: SedTankslopes.xmcd]
# [reference: Sed Tank Inlet Slope.xmcd]
# [reference: chemicalstock.xmcd]
# [reference: SedTank.xmcd]
# [component: inputs SedTank]
# [reference: Flocculation Tank.xmcd]
# [component: inputs FlocTank]
# [reference: Entrance Tank.xmcd]
# [component: inputs EntranceTank]
