# Flocculator Modular Design
# User Inputs
Q_Plant := □  # error: This placeholder is empty.  # To be left undefined and inputed online by the user
method := "Flocculator"
# From Expert Inputs
Country := 0
Language := 0
# Design References
# [reference: MathFunctions.xmcd]
# [reference: PipeDatabase.xmcd]
# [reference: FluidsFunctions.xmcd]
# [reference: Flocculator.xmcd]
# [reference: MtoATranslators.xmcd]
# [reference: MtoATranslatorsWrapped.xmcd]
# [reference: PlumbingF.xmcd]
# Flocculator Code
# [reference: FlocculatorAC.xmcd]
# Previews
# [reference: LayoutsAC.xmcd]
# Display Variables
Q_Plant =  # error: This variable is undefined.
AC_Floc =  # error
AI_Preview = [
    "laythw";
    "LoadPlot";
    "_-view o f";
    "-plot n ";
    "AguaClaraPlot";
    "PublishToWeb PNG.pc3";
    "[FILEPATH]Flocculator_Front";
    "n y";
    "_-view o t";
    "-plot n ";
    "AguaClaraPlot";
    "PublishToWeb PNG.pc3";
    "[FILEPATH]Flocculator_Top";
    "n y";
    "_-view o r";
    "-plot n ";
    "AguaClaraPlot";
    "PublishToWeb PNG.pc3";
    "[FILEPATH]Flocculator_Right";
    "n y";
    "shademode x -view swiso";
    "-plot n ";
    "AguaClaraPlot";
    "PublishToWeb PNG.pc3";
    "[FILEPATH]Flocculator_SWIso";
    "n y";
    "shademode 2"
]
