# AguaClara Design Tool
Country = 1
Q_Plant = 0.02
Language = 0
Country := 0
# Design References
# MathCAD dimension calculations:
# [reference: BasicClientInputs.xmcd]
# [reference: ExpertInputs.xmcd]
# [reference: DesignAssumptions.xmcd]
# [reference: MathFunctions.xmcd]
# [reference: PipeDatabase.xmcd]
# [reference: MinorLossCoefficients.xmcd]
# [reference: FluidsFunctions.xmcd]
# [reference: Sedimentation Tank.xmcd]
# [reference: Flocculator.xmcd]
# [reference: Rapid Mix.xmcd]
# [reference: LFOM.xmcd]
# [reference: EntranceTankDim.xmcd]
# [reference: LinearCdc_app37.xmcd]
# [reference: ChemStorageCylinders.xmcd]
# [reference: SRSF jcw57.xmcd]
# [reference: Materials List.xmcd]
# AutoCAD drawing programs:
# Translators:
# These are the codes that take MathCAD outputs and create AutoCAD scripts that are used to draw the plant (formerly Basics)
# [reference: MtoATranslators.xmcd]
# The wrapped MtoA translator contains the functions that the user will want to access. These functions will draw pieces with full functionality - specifying the location, dimension, and orientation of the object. Also, it contains layer control and subtraction capabilities for grouped objects.
# [reference: MtoATranslators Wrapped.xmcd]
# Plant Elements:
# These are all of the files that draw the fundamental parts of the plants (tees, elbows, tanks, pipes, etc)
# [reference: Channel.xmcd]
# [reference: cross.xmcd]
# [reference: Sludge.xmcd]
# [reference: Manifold.xmcd]
# [reference: pipe.xmcd]
# [reference: elbow.xmcd]
# [reference: Tee.xmcd]
# [reference: tank.xmcd]
# [reference: lamina.xmcd]
# [reference: adapter.xmcd]
# [reference: Tee2.xmcd]
# [reference: pvccap.xmcd]
# [reference: LaunderCap.xmcd]
# [reference: ChimneyStops.xmcd]
# [reference: laminaplain.xmcd]
# [reference: Stairs.xmcd]
# [reference: DrainChannel.xmcd]
# [reference: Manifold.xmcd]
# Specific Pieces:
# These are the codes that draw the bigger pieces of the plant (the sed tank, floc tank, etc)
# [reference: floctank.xmcd]
# [reference: SedTank- with pieces.xmcd]
# [reference: Entrance Tank.xmcd]
# [reference: ChemStockCylinders.xmcd]
# [reference: Plant Drain Channel.xmcd]
# [reference: Operator Access.xmcd]
# [reference: SRSF.xmcd]
# Layouts:
# This file will execute at the very end to create multiple views of the entire plant in paperspace
# [reference: Layouts.xmcd]
# Entrance Tank:
L_Et = 5.05835 m  # length of the entrance tank
L_EtHopper = 1.65252 m  # length of the entrance tank hopper
H_EtHopper = 1.23316 m  # height of the entrance tank hopper
H_EtTop = 0.266841 m  # height of the top part of the entrance tank above the hoppers
H_Et = 1.6 m  # height of the entrance tank
Z_Et = 0.55905 m  # elevation of the entrance tank
ND_RMPipe = 0.2032 m  # nominal diameter of the rapid mix pipe
ND_EtOverflow = 0.381 m  # nominal diameter of the overflow weir
# Sed Tanks and Slopes:
N_SedTanks = 3
H_SedBetween = 0.514591 cm  # Distance from the top of the inlet manifold to the bottom of the ledge supporting the lamella frame
L_Sed = 4.8242 m
N_SedBays = 2  # Number of bays of inlet manifolds in each sed tank
# Length of the port through which water exits the inlet manifold
# Width of ferrous cement plates in whice one manifold port is cut
Q_SedBay = 3.33333 L/s
# Sedimentation Tank Sludge Drain:
N_SedSludgeOrifices = 48  # per cell
Ti_SludgeDrain = 30 min  # Tank Drain time
W_SedSludge = 9.46226 cm  # Width of the sludge channel
B_SedSludgeOrifices = 10 cm  # Distance center to center between drain orifices
H_SedSludge = 4.73113 cm  # Depth of the sludge channel
T_SedSludge = 5 cm
T_SedSludge = 5 cm
# Thickness of the plate topping the sludge channel
# through which drain holes are formed
W_SedDrainCover = 19.4623 cm
D_SedSludgeOrifice = 0.0079375 m  # Diameter of drain orifices
W_SedInletBottom = 0.340189 m
N_SedSludgeOrifices = 48
ND_SedSludgeValve = 3 in
# Sedimentation Tank Dimensions:
Z_SedSludge = 0.0973113 m  # Height from 0 of the top of the sludge drain
Z_SedSlopes = 0.643234 m  # Height from 0 of the top of the inlet manifold
W_Sed = 1.75 m  # Total tank wall height
L_Sed = 4.8242 m  # Total tank length
# Inlet Channel:
HW_InletChannel = 0.318526 m  # Width of the drop chimneys connecting channel to sed inlet manifolds
W_InletChannel = 0.468526 m  # length of drop chimmneys
L_Channel = 5.45 m
N_SedInletPipes = 2  # per sed bay
H_InletChannel = 0.418526 m
# Sedimentation Tank Effluent Launder:
N_SedLaunderOrifices = 66  # Number of orifices per launder
Q_SedLaunderOrifices = 5.1206e-5 m^3/s  # More Launder Dimensions
ND_SedLaunder = 4 in
B_SedLaunderOrifices = 0.112421 m  # Center to center launder spacing
L_SedLaunder = 3.76286 m
# Exit Channel:
D_SedLaunderOrifice = 0.4375 in
W_ExitChannel = 0.365812 m
H_ExitChannel = 0.418526 m
L_ExitChannel = 5.45 m
H_PltWeir = 0.328526 m  # height of the weir carrying water to the distribution tank
HW_ExitChannel = 0.278526 m  # water height in exit channel from 0
# Lamella:
L_SedPlate = 0.522571 m
B_SedPlate = 2.98328 cm  # center to center distance between lamella
S_SedPlate = 2.78328 cm  # spacing between lamella
N_SedPlates = 110  # Number of Sed Plates per Sedimentation Tank Bay.
AN_SedPlate = 1.0472
V_SedC = 10.1975 m/day
L_SedActive = 3.78927 m
T
V_SedUp = 68.2274 m/day
Z_SedLaunder = 1.29635 m
H_SedPlate = 0.45256 m
H_SedAbove = 0.17003 m  # Height of water needed above the lamella
N_SedPlates = 110
HW_Sed = 1.40923 m
H_Sed = 1.50923 m
Z_Mp = 1.0907 m
H_SedBayDivider = 0.64838 m
# Flocculator:
W_FlocChannel = 0.54 m
ED_Floc = 0.006 m^2/s^3
HW_FlocEnd = 1.40923 m
N_FlocChannels = 5
L_FlocTank = 24.121 m
HL_Floc = 24.2406 cm
HW_FlocStart = 1.65164 m
S_FlocBaffle = [23.731; 23.731; 23.731; 23.731; 24.661] cm
B_FlocBaffle = [23.931; 23.931; 23.931; 23.931; 24.861] cm
N_FlocChannelBaffles = [19; 19; 19; 19; 18]
W_FlocPort = [0.23731; 0.23731; 0.23731; 0.23731; 0.252011] m
HL_FlocChannels = [4.96763; 4.96763; 4.96763; 4.96763; 4.37004] cm
L_FlocBaffleLower = 1.05327 m
L_FlocBaffleUpper = 1.34567 m
H_FlocPort = [0.54; 0.54; 0.54; 0.54; 0.528427] m
Ti_Floc = 15.2964 min  # residence time of the flocculator
N_FlocBaffles = 94
# Materials List:
N_Launders = 6
L_LaunderPipeTotal = 22.5771 m
N_Valves = 6
N_LaunderCouplings = 6
N_ValveCouplings = 6
N_SedPlatesTotal = 660
N_SedPlatesPerSheet = 7
N_SedPlateSheets = 95
AC_FilterA :=
    AC_Filter if last(AC_Filter) < 598
    submatrix(AC_Filter, 0, 598, 0, 0) otherwise
AC_SedTankA :=
    AC_SedTank if last(AC_SedTank) < 598
    submatrix(AC_SedTank, 0, 598, 0, 0) otherwise
AC_FilterB :=
    submatrix(AC_Filter, 599, last(AC_Filter), 0, 0) if last(AC_Filter) < 1197
    submatrix(AC_Filter, 599, 1197, 0, 0) otherwise
AC_SedTankB :=
    submatrix(AC_SedTank, 599, last(AC_SedTank), 0, 0) if last(AC_SedTank) < 1197
    submatrix(AC_SedTank, 599, 1197, 0, 0) otherwise
AC_FilterC :=
    submatrix(AC_Filter, 1198, last(AC_Filter), 0, 0) if last(AC_Filter) < 1796
    submatrix(AC_Filter, 1198, 1796, 0, 0) otherwise
AC_SedTankC :=
    submatrix(AC_SedTank, 1198, last(AC_SedTank), 0, 0) if last(AC_SedTank) < 1796
    submatrix(AC_SedTank, 1198, 1796, 0, 0) otherwise
AC_FlocTankA :=
    AC_FlocTank if last(AC_FlocTank) < 598
    submatrix(AC_FlocTank, 0, 598, 0, 0) otherwise
AC_ChemTanksA :=
    AC_ChemTanks if last(AC_ChemTanks) < 598
    submatrix(AC_ChemTanks, 0, 598, 0, 0) otherwise
AC_FlocTankB :=
    submatrix(AC_FlocTank, 1198, last(AC_FlocTank), 0, 0) if last(AC_FlocTank) < 1197
    submatrix(AC_FlocTank, 1198, 1796, 0, 0) otherwise
AC_ChemTanksB :=
    submatrix(AC_ChemTanks, 1198, last(AC_ChemTanks), 0, 0) if last(AC_ChemTanks) < 1197
    submatrix(AC_ChemTanks, 1198, 1796, 0, 0) otherwise
AC_FlocTankC :=
    submatrix(AC_FlocTank, 1198, last(AC_FlocTank), 0, 0) if last(AC_FlocTank) < 1796
    submatrix(AC_FlocTank, 1198, 1796, 0, 0) otherwise
AC_ChemTanksC :=
    submatrix(AC_ChemTanks, 1198, last(AC_ChemTanks), 0, 0) if last(AC_ChemTanks) < 1796
    submatrix(AC_ChemTanks, 1198, 1796, 0, 0) otherwise
AC_EntranceTankA :=
    AC_EntranceTank if last(AC_EntranceTank) < 598
    submatrix(AC_EntranceTank, 0, 598, 0, 0) otherwise
AC_DrainChannelA :=
    AC_DrainChannel if last(AC_DrainChannel) < 598
    submatrix(AC_DrainChannel, 0, 598, 0, 0) otherwise
AC_EntranceTankB :=
    submatrix(AC_EntranceTank, 1198, last(AC_EntranceTank), 0, 0) if last(AC_EntranceTank) < 1197
    submatrix(AC_EntranceTank, 1198, 1796, 0, 0) otherwise
AC_DrainChannelB :=
    submatrix(AC_DrainChannel, 1198, last(AC_DrainChannel), 0, 0) if last(AC_DrainChannel) < 1197
    submatrix(AC_DrainChannel, 1198, 1796, 0, 0) otherwise
AC_EntranceTankC :=
    submatrix(AC_EntranceTank, 1198, last(AC_EntranceTank), 0, 0) if last(AC_EntranceTank) < 1796
    submatrix(AC_EntranceTank, 1198, 1796, 0, 0) otherwise
AC_DrainChannelC :=
    submatrix(AC_DrainChannel, 1198, last(AC_DrainChannel), 0, 0) if last(AC_DrainChannel) < 1796
    submatrix(AC_DrainChannel, 1198, 1796, 0, 0) otherwise
AC_OperatorAccessA :=
    AC_OperatorAccess if last(AC_OperatorAccess) < 598
    submatrix(AC_OperatorAccess, 0, 598, 0, 0) otherwise
AC_LayoutA :=
    AC_Layout if last(AC_Layout) < 598
    submatrix(AC_Layout, 0, 598, 0, 0) otherwise
AC_OperatorAccessB :=
    submatrix(AC_OperatorAccess, 1198, last(AC_OperatorAccess), 0, 0) if last(AC_OperatorAccess) < 1197
    submatrix(AC_OperatorAccess, 1198, 1796, 0, 0) otherwise
AC_LayoutB :=
    submatrix(AC_Layout, 1198, last(AC_Layout), 0, 0) if last(AC_Layout) < 1197
    submatrix(AC_Layout, 1198, 1796, 0, 0) otherwise
AC_OperatorAccessC :=
    submatrix(AC_OperatorAccess, 1198, last(AC_OperatorAccess), 0, 0) if last(AC_OperatorAccess) < 1796
    submatrix(AC_OperatorAccess, 1198, 1796, 0, 0) otherwise
AC_LayoutC :=
    submatrix(AC_Layout, 1198, last(AC_Layout), 0, 0) if last(AC_Layout) < 1796
    submatrix(AC_Layout, 1198, 1796, 0, 0) otherwise
AC_EntranceTankA = [
    "-layer m Cdc"; "c t 129,0,129"; "Cdc"; "  "; "-insert Float.dwg"; "-4.93215,10.9065,1.75745 0.90553 0.90553 0"; "-insert LeverArmBracket.dwg"; "-4.89855,10.50005,2.15905 1 1 0"; "-insert LeverArm.dwg"; "-4.93055,10.9128,2.18395 1 1 0"
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]
AC_EntranceTankB =  # error: This variable is undefined.
AC_EntranceTankC =  # error
AC_FlocTankA = [
    "-layer m FlocTank";
    "c t 132,132,132";
    "FlocTank";
    "  ";
    "_-view o t _zoom w 0.06,5.34,0 -4.8842,8.36,1.75164 _box 0,5.4,0 -4.8242,8.3,1.75164 _box 0.05,5.35,-0.05 -4.8742,8.35,1.75164 _subtract 0.05,5.35,-0.05  0,5.4,0 ";
    "_box -4.8742,5.94,0 0.05,5.99,1.75164";
    "_box -4.8742,6.53,0 0.05,6.58,1.75164";
    "_box -4.8742,7.12,0 0.05,7.17,1.75164";
    "_box -4.8742,7.71,0 0.05,7.76,1.75164";
    "-group c FlocTank y "
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]
AC_FlocTankB =  # error
AC_FlocTankC =  # error
AC_OperatorAccessA = [
    "-layer m AlumPlatform"; "c t 132,132,132"; "AlumPlatform"; "  "; "_-view o f"; "_pline"; "-7.26195,2.75905"; "-6.96195,2.75905"; "-6.96195,2.5584"; "-6.66195,2.5584"
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]
AC_OperatorAccessB =  # error
AC_OperatorAccessC =  # error
AC_SedTankA = [
    "_-view o t"; "-layer m tank"; "c t 132,132,132"; "tank"; "  "; "_-view o t _zoom w 0.06,-0.06,0 -4.8842,1.81,1.50923 _box 0,0,0 -4.8242,1.75,1.50923 _box 0.05,-0.05,-0.05 -4.8742,1.8,1.50923 _subtract 0.05,-0.05,-0.05  0,0,0 "; "_box -4.30568,0,1.23206 -4.25568,1.75,1.18206"; "_box 0,0,0.42927 -0.05,1.75,0.37927"; "-group c tank y "; "all "
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]
AC_SedTankB = [
    "_subtract -4.30026,0.02413,0.67251  -4.31026,0.02202,0.67251 ";
    "rotate3d l  z -2.55026,0,0.67251 270";
    "_cylinder -4.4449,0,0.67251 0.02413 c -6.1949,0,0.67251";
    "_cylinder -4.4349,0,0.67251 0.02202 c -6.2049,0,0.67251";
    "_zoom w -6.2049,-0.03413,0.67251 -6.1849,0.03413,0.67251";
    "_subtract -6.1949,0.02413,0.67251  -6.2049,0.02202,0.67251 ";
    "rotate3d l  z -4.4449,0,0.67251 270";
    "-group c PipeFrame y ";
    "all ";
    "-layer s 0"
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]
AC_SedTankC = [
    "c t 0,255,0";
    "exitweirelbow";
    "  ";
    "_-view o t _zoom w -0.84488,-0.52275,0.2286 -0.18352,0.1386,0.2286 _torus -0.5142,-0.19208,0.2286 0.2286 0.08414 _box -0.83488,-0.51275,0.08746 -0.5142,0.1286,0.36974 _subtract -0.20146,-0.19208,0.2286  -0.5142,-0.19208,0.2286 ";
    "_torus -0.5142,-0.19208,0.2286 0.2286 0.07725 _subtract -0.20146,-0.19208,0.2286  -0.82005,-0.19208,0.2286  _box -0.5142,-0.51481,0.13653 -0.19146,-0.19208,0.32068 _subtract -0.5142,0.03653,0.2286  -0.5142,-0.19208,0.2286 ";
    "_cylinder -0.5142,0.03653,0.2286 0.09207 a -0.5712,0.03653,0.2286 _cylinder -0.5142,0.03653,0.2286 0.08414 a -0.5712,0.03653,0.2286 _subtract -0.5142,-0.05555,0.2286  -0.5812,-0.04761,0.2286 -0.5042,0.12066,0.2286 ";
    "_mirror -0.5712,-0.05555,0.2286  -0.5142,-0.19208 -0.5042,-0.18208  _union -0.5142,-0.19208,0.2286 1 @0.31274<45 -0.2856,-0.24908,0.2286 -0.5712,0.03653,0.2286 ";
    "_rotate3d -0.2856,-0.19208,0.14446  y -0.5142,-0.19208,0.2286 90";
    "_rotate3d -0.5142,-0.04761,0.2286  z -0.5142,-0.19208,0.2286 270";
    "_-view o t _zoom w -0.38768,-0.7569,0.2286 0.27368,-0.09555,0.2286 _torus -0.057,-0.42623,0.2286 0.2286 0.08414 _box -0.37768,-0.7469,0.08746 -0.057,-0.10555,0.36974 _subtract 0.25574,-0.42623,0.2286  -0.057,-0.42623,0.2286 "
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]
# AC_FilterA | AC_FilterB | AC_FilterC
AC_ChemTanksA = [
    "-layer m CoagTanks"; "c t 132,132,132"; "CoagTanks"; "  "; "_-view o t"; "_cylinder -5.72295,10.81215,2.75905 0.3098 1.0718"; "_cylinder -5.72295,10.81215,2.76405 0.3048 1.0668"; "_-view o t"; "_subtract -6.03275,10.81215,2.75905  -6.02775,10.81215,2.75905 "; "-group c CoagTanks y "
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]
AC_ChemTanksB =  # error
AC_ChemTanksC =  # error
AC_DrainChannelA = [
    "-layer m DrainChannel"; "c t 214,214,214"; "DrainChannel"; "  "; "3dpoly"; "0.1,-1.125,-0.2024"; "0.1,-1.125,-0.27829"; "0.1,-0.825,-0.40418"; "0.1,-0.525,-0.27829"; "0.1,-0.525,-0.2024"
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]
AC_DrainChannelB =  # error
AC_DrainChannelC =  # error
# AC_LayoutA | AC_LayoutB | AC_LayoutC
