# AguaClara Design Tool
Country = 229
Language = 0
C_ChlorineDoseMax := 2*mg/L
C_ChlorineStock := 50*gm/L
Ti_ChlorineStock := 30 hr
Country := 0  # Needs to be redefined as zero until we create a database for all countries.
## References
# MathCAD dimension calculations:
# [reference: BasicClientInputs.xmcd]
# [reference: ExpertInputs.xmcd]
# [reference: MathFunctions.xmcd]
# [reference: PipeDatabase.xmcd]
# [reference: FluidsFunctions.xmcd]
# [reference: SedimentationTank.xmcd]
# [reference: flocculator may.xmcd]
# [reference: LFOM.xmcd]
# [reference: LinearCdc.xmcd]
# [reference: ChemStorageTanks.xmcd]
# [reference: EntranceTank.xmcd]
# [reference: StackedRapidSandFilterabh35.xmcd]
# [reference: DrainChannel.xmcd]
# [reference: MaterialsList.xmcd]
# AutoCAD drawing programs:
# Translators:
# These are the codes that take MathCAD outputs and create AutoCAD scripts that are used to draw the plant (formerly Basics)
# [reference: MtoATranslators.xmcd]
# The wrapped MtoA translator contains the functions that the user will want to access. These functions will draw pieces with full functionality - specifying the location, dimension, and orientation of the object. Also, it contains layer control and subtraction capabilities for grouped objects.
# [reference: MtoATranslatorsWrapped.xmcd]
# Drawing functions:
# [reference: ChannelF.xmcd]
# [reference: PlumbingF.xmcd]
# [reference: TankF.xmcd]
# [reference: StairsF.xmcd]
# [reference: DrainChannelF.xmcd]
# AutoCAD Script Files:
# [reference: FlocculatorAC.xmcd]
# [reference: SedimentationTankAC.xmcd]
# [reference: EntranceTankAC.xmcd]
# [reference: ChemStockTanksAC.xmcd]
# [reference: DrainChannelAC.xmcd]
# [reference: StackedRapidSandFilterACabh35.xmcd]
# [reference: CdcAC.xmcd]
# [reference: OperatorAccessAC.xmcd]
# [reference: MaterialsAC.xmcd]
# Layouts:
# This rearranges the plant to optimize the layout
# [reference: PlantLayoutsAC.xmcd]
# This file will execute at the very end to create multiple views of the entire plant in paperspace
# [reference: LayoutsAC.xmcd]
## All variables displayed must have the standard SI units. They may not have units attached by the user.
# General
Q_Plant = 0.07 m^3/s
Pi_VenaContractaOrifice = 0.63
T_PlantWall = 0.15 m
W_SedPlate = 1 m
T_ConcreteMin = 0.05 m
L_SedPlateSheet = 3 m
C_CoagStock = 262.5 kg/m^3
T_SedPlate = 0.002 m
Ti_CoagStock = 108000 s
T_SedWeir = 0.04 m
C_ChlorineStock = 50 kg/m^3
W_SedBay = 1 m
Ti_ChlorineStock = 108000 s
HL_ChannelMax = 0.05 m  # Eliminate FCM variable from design specs
H_PlantFreeboard = 0.1 m
EN_DrillSeries = 0
# Entrance Tank
V_EtUp = 0.008 m/s
W_EtCapture = 1.40246 m
H_EtOverflowChannel =  # error: This variable is undefined.
H_Et = 1.21444 m
H_EtTop = 0.3 m  # height of the top part of the entrance tank above the hoppers
W_Et = 1.40246 m
L_Et = 7.30467 m
ND_EtDrain = 0.0762 m
HL_Lfom = 0.2 m
ZW_Et = 2.26426 m
Z_EtTop = 2.36426 m
Z_Et = 1.14982 m  # elevation of top of slab.
ND_RMPipe = 0.508 m
Z_EtHopper = 2.06426 m
H_EtHopper = 0.914439 m
N_EtHoppers =  # error
ND_EtFlowControl = 0.2032 m
L_EtHopper = 1.92968 m
AN_EtSlope = 0.785398
W_EtDC = 0.594845 m  # drain channel under entrance tank dimensions
L_EtDC = 7.45467 m
H_EtDC = 0.297422 m  # Give heights of the channel at the beginning and end and change the design specs to explain that it's sloped.
# Flow measurement
D_LfomOrifices = 0.01905 m
S_LfomRows = 0.02 m
H_LfomOrifice = [0.009525; 0.029525; 0.049525; 0.069525; 0.089525; 0.109525; 0.129525; 0.149525; 0.169525; 0.189525] m
Q_LfomScale = [0; 0.007; 0.014; 0.021; 0.028; 0.035; 0.042; 0.049; 0.056; 0.063; 0.07] m^3/s
N_LfomOrifices = [41; 41; 41; 41; 40; 0; 10; 14; 12; 13]
ND_Lfom = 0.508 m
HL_Lfom = 0.2 m
# Rapid Mix
ED_Tee = 0.0474146 m^2/s^3
Z_LfomOrifices = 2.07379 m  # elevation of the center of
Z_EtExit = 1.14126 m  # elevation of center of pipe exiting the entrance tank and heading toward the flocculator
W_DC =  # error
# Maybe give the vertical distances below the bottom of the sed tank of the beginning and end of the channel? Calculate them, display, and add to the design specs.
H_DC =  # error
L_DC =  # error
# Plant Drain Channel
Z_CoagTank = 2.66426 m
Z_CoagTankOutlet = 2.76426 m
L_CdcFloatArm = 0.41275 m
Q_CdcMax = 1.4e-5 m^3/s
L_CdcScaleArm = 0.50165 m
C_CoagDoseMax = 0.06 kg/m^3
B_StockOutlet = 0.1 m
L_CoagCdcTube = 1.20053 m
D_CdcTube = 0.003175 m
N_CoagCdcTubes = 8
HL_Cdc = 0.2 m
L_CdcFloatArm = 0.41275 m
L_CdcScaleArm = 0.50165 m
# Coag Dose Controller
# Flocculator
H_Floc = 2.02338 m
Z_FlocTank = 0 m  # Look at Flocculator Positioning arrays
N_FlocValves = 2
W_FlocChannel = 0.82 m
Ti_Floc =  # error  # Fill last channel with bafffles from last channel
H_FlocSlope = 0.05715 m  # Fix port width to be based on energy dissipation in that channel
ED_Floc = 0.01 m^2/s^3
# Adjust spacing after the number of baffles per channel is known.
V_Floc = 0.140661 m/s  # Check the residence time of the flocculator should be at least 20minutes
HW_FlocEnd = 1.82856 m
ND_FlocValve = 0.1016 m
CP_Floc = 75 m^(2/3)
Ti_FlocDrain = 1800 s
CP_FlocTotal =  # error
N_FlocChannels = 4
G_Floc =  # error
L_FlocTank =  # error
HL_Floc = 0.0948258 m
ED_FlocChannelFirst =  # error
HW_FlocStart = 1.92338 m
S_FlocBaffle = [0.606889; 0.606889; 0.606889; 0.606889] m
B_FlocBaffle = [0.608889; 0.608889; 0.608889; 0.608889] m
N_FlocChannelBaffles = [11; 11; 11; 10]
W_FlocPort = [0.556889; 0.556889; 0.556889; 0.543538] m
S_FlocBaffleFirst =  # error
HL_FlocChannels =  # error
L_FlocBaffleLower = 0.918223 m
L_FlocBaffleUpper = 1.06305 m
H_FlocPort = [1.34043; 1.34043; 1.34043; 1.34043] m
Ti_Floc =  # error  # residence time of the flocculator
N_FlocBaffles =  # error
ND_FlocValve = 4 in
EN_FlocBaffle = 0
# Sed Tanks
N_SedTanks = 6
L_Sed = 7.30467 m
N_SedBays = 2  # Number of bays of inlet manifolds in each sed tank
Q_SedBay = 0.00583333 m^3/s
V_SedUpBod = 0.001 m/s  # design constraints
V_SedCBod = 0.00012 m/s
V_SedUp = 0.000998581 m/s  # Actual values from this design
V_SedC =  # error
W_SedSideSlopes = 0.49165 m
AN_SedSlope = 0.872665
Ti_Sed =  # error
# Sedimentation Tank Sludge Drain:
N_SedSludgeOrifices = 56  # per cell
Ti_SludgeDrain = 1800 s  # Tank Drain time
W_SedSludge = 0.0965014 m  # Width of the sludge channel
H_SedSludge = 0.0965014 m  # Depth of the sludge channel
# Distance center to center between drain orifices
B_SedSludgeOrifices = 0.104065 m
W_SedDrainCover = 0.136501 m
D_SedSludgeOrifice = 0.00899468 m  # Diameter of drain orifices
N_SedSludgeOrifices = 56
ND_SedSludgePipe = 0.1016 m
# Sedimentation Tank Dimensions:
Z_SedSludge = 0.0965014 m  # Height from 0 of the top of the sludge drain
Z_SedSideSlopes = 0.749127 m
W_Sed = 2 m  # Total tank wall height
L_Sed = 7.30467 m  # Total tank length
H_Sed = 1.95496 m
# Sedimentation Tank Inlet Channel:
EN_InletChannelGeom = 1
HW_SedInletChannel = 0.54315 m
W_SedInletChannel = 0.764752 m
L_SedChannel = 12.75 m
H_SedInletChannel = 0.64315 m
HL_SedWeirInlet = 0.0205767 m
W_SedInletChannelPreWeir = 0.543538 m
H_SedWeirInlet = 0.522573 m
W_SedWeirInlet = 12.75 m
# Sedimentation Tank Effluent Launder:
N_SedLaunderOrifices = 57  # Number of orifices per launder
N_SedLaunderOrificesRow =  # error  # Number of orifices per row
Z_SedLaunder = 1.71008 m
Q_SedLaunderOrifices = 0.000102339 m^3/s
B_SedLaunderOrifices = 0.1 m  # Center to center launder spacing
# More Launder Dimensions
ND_SedLaunder = 0.1524 m
D_SedLaunderOrifice = 0.015875 m
L_SedLaunder = 5.92493 m
HL_SedLaunderOrifice = 0.0343414 m
# Sedimentation Tank Inlet Manifold:
ND_SedManifold = 0.2032 m
L_SedManifoldDiffuser = 0.156036 m
Z_SedManifoldPipe = 0.419835 m
ND_SedDiffuser = 0.0254 m
D_SedManifoldPort = 0.03175 m
B_SedManifoldPort = 0.0498125 m
N_SedManifoldPorts = 115
L_SedManifoldPipe = 6.00116 m
ED_SedInlet = 0.01 m^2/s^3
Q_SedManifoldPort = 5.07246e-5 m^3/s
# Exit Channel:
W_SedExitChannel = 0.408297 m
H_SedExitChannel = 0.64315 m
HW_SedExitChannel = 0.50315 m  # water height in exit channel from base of channel
H_SedWeirExit = 0.482403 m
# Lamella:
L_SedPlate = 0.6 m
B_SedPlate = 0.027 m  # center to center distance between lamella
S_SedPlate = 0.025 m  # spacing between lamella
N_SedPlates = 184  # Number of Sed Plates per Sedimentation Tank Bay.
N_SedModules = 23  # Number of modules per bay
N_SedModulePlates = 8  # Number of plates per module
AN_SedPlate = 1.0472
L_SedActive = 5.73424 m
Z_SedLaunder = 1.71008 m
HW_Sed = 1.82856 m
H_Sed = 1.95496 m
# SRSF
H_Fi = 4.56695 m
L_Fi = 1.48239 m
W_Fi = 1.70399 m
B_FiManifoldBranch = 0.1 m
ND_FiTrunk = 0.1524 m
ND_FiManBranch = 0.0254 m
ND_FiBwTrunk = 0.254 m
ND_FiBwManBranch = 0.0381 m
ND_FiExitWaste = 0.1016 m
ND_FiBwWeirDrain =  # error
ND_FiBwDrain =  # error  # For the box that holds keeps the end of the siphon submerged
ND_FiSandOutlet = 0.0508 m
Ti_FiSand = 1190.09 s  # This is the time required to empty the filter of the sand.
ND_FiSiphonAirValve = 0.01905 m
ND_FiSiphon = 0.2032 m
Q_FiSiphonMax = 0.0809868 m^3/s
B_FiSiphonManOrifices = 0.103821 m
N_FiSiphonManOrifices = 12
D_FiSiphonManOrifices = 0.0580795 m
Ti_FiBwInitiation = 114.649 s
H_FiSand = 1.26 m
N_FiLayer = 6
H_FiLayer = 0.2 m
V_FiLayer = 0.00183333 m/s
HL_FiTerminal = 0.4 m
V_FiBw = 0.011 m/s
HL_FiBwInitiation = 1.4474 m
HL_FiBwSS = 1.2474 m
D_FiSand =  # error
N_Fi = 3
Q_Fi = 0.0233333 m^3/s
W_Slots =  # error
B_FiBwManSlot = 0.0047625 m
L_FiBwManSlot =  # error
B_FiManSlot = 0.003175 m
L_FiManSlot =  # error
N_FiSlotRows = 2
Z_FiBottom = -3.37866 m
Z_FiTop = 1.18829 m
# Weirs
HL_FiWeir =  # error
L_FiWeir =  # error
Z_FiEntranceWeir = 1.03904 m
Z_FiBwWeir =  # error
Z_FiSiphonInlet = -1.51208 m  # This is the centerline elevation of the siphon orifices
Z_FiExitWeir =  # error
Z_FiExitBottom = 0.164657 m  # bottom of the filtered water box
Z_FiEntranceBottom = 0.164657 m  # bottom of the entrance box
Z_FiSiphonCoupling = 0.348944 m
Z_FiBwTop =  # error
W_FiBwDrain =  # error
H_FiBwDrain =  # error
N_Launders =  # error
L_LaunderPipeTotal =  # error
N_LaunderCouplings =  # error
N_ValveCouplings = 12
N_SedPlatesTotal = 2208
N_SedPlatesPerSheet = 5
N_SedPlateSheets = 442
N_Valves = 12
A_EtFloor = 12.9467 m^2
W_FlocWithWalls = 3.88 m
L_FlocWithWalls = 7.60467 m
Vol_FlocFloor = 4597.02 L
A_FlocFloor = 30.6468 m^2
Vol_SedSlopes =  # error
A_SedWalls =  # error
A_SedFloor = 99.241 m^2
# Materials List
# Plant Summary Calculations:
HL_PlantTotal := Z_EtTop - H_PlantFreeboard - Z_FiExitWeir
HL_PlantTotal =  # error
## Make AC variables that are shorter than 598 lines
AC_CdcA :=
    AC_Cdc if last(AC_Cdc) < 598
    submatrix(AC_Cdc, 0, 598, 0, 0) otherwise
AC_CdcB :=
    submatrix(AC_Cdc, 599, last(AC_Cdc), 0, 0) if last(AC_Cdc) < 1197
    submatrix(AC_Cdc, 599, 1197, 0, 0) otherwise
AC_CdcC :=
    submatrix(AC_Cdc, 1198, last(AC_Cdc), 0, 0) if last(AC_Cdc) < 1796
    submatrix(AC_Cdc, 1198, 1796, 0, 0) otherwise
AC_SedTankA :=
    AC_SedTank if last(AC_SedTank) < 598
    submatrix(AC_SedTank, 0, 598, 0, 0) otherwise
AC_FilterA :=
    AC_Filter if last(AC_Filter) < 598
    submatrix(AC_Filter, 0, 598, 0, 0) otherwise
AC_SedTankB :=
    submatrix(AC_SedTank, 599, last(AC_SedTank), 0, 0) if last(AC_SedTank) < 1197
    submatrix(AC_SedTank, 599, 1197, 0, 0) otherwise
AC_FilterB :=
    submatrix(AC_Filter, 599, last(AC_Filter), 0, 0) if last(AC_Filter) < 1197
    submatrix(AC_Filter, 599, 1197, 0, 0) otherwise
AC_SedTankC :=
    submatrix(AC_SedTank, 1198, last(AC_SedTank), 0, 0) if last(AC_SedTank) < 1796
    submatrix(AC_SedTank, 1198, 1796, 0, 0) otherwise
AC_FilterC :=
    submatrix(AC_Filter, 1198, last(AC_Filter), 0, 0) if last(AC_Filter) < 1796
    submatrix(AC_Filter, 1198, 1796, 0, 0) otherwise
AC_ChemTanksA :=
    AC_ChemTanks if last(AC_ChemTanks) < 598
    submatrix(AC_ChemTanks, 0, 598, 0, 0) otherwise
AC_FilterD :=
    submatrix(AC_Filter, 1797, last(AC_Filter), 0, 0) if last(AC_Filter) < 2395
    submatrix(AC_Filter, 1797, 2395, 0, 0) otherwise
AC_FlocTankA :=
    AC_FlocTank if last(AC_FlocTank) < 598
    submatrix(AC_FlocTank, 0, 598, 0, 0) otherwise
AC_ChemTanksB :=
    submatrix(AC_ChemTanks, 599, last(AC_ChemTanks), 0, 0) if last(AC_ChemTanks) < 1197
    submatrix(AC_ChemTanks, 599, 1197, 0, 0) otherwise
AC_FlocTankB :=
    submatrix(AC_FlocTank, 599, last(AC_FlocTank), 0, 0) if last(AC_FlocTank) < 1197
    submatrix(AC_FlocTank, 599, 1197, 0, 0) otherwise
AC_ChemTanksC :=
    submatrix(AC_ChemTanks, 1198, last(AC_ChemTanks), 0, 0) if last(AC_ChemTanks) < 1796
    submatrix(AC_ChemTanks, 1198, 1796, 0, 0) otherwise
AC_FlocTankC :=
    submatrix(AC_FlocTank, 1198, last(AC_FlocTank), 0, 0) if last(AC_FlocTank) < 1796
    submatrix(AC_FlocTank, 1198, 1796, 0, 0) otherwise
AC_FlocTankD :=
    submatrix(AC_FlocTank, 1797, last(AC_Filter), 0, 0) if last(AC_FlocTank) < 2395
    submatrix(AC_FlocTank, 1797, 2395, 0, 0) otherwise
AC_DrainChannelA :=
    AC_DrainChannel if last(AC_DrainChannel) < 598
    submatrix(AC_DrainChannel, 0, 598, 0, 0) otherwise
AC_EntranceTankA :=
    AC_EntranceTank if last(AC_EntranceTank) < 598
    submatrix(AC_EntranceTank, 0, 598, 0, 0) otherwise
AC_DrainChannelB :=
    submatrix(AC_DrainChannel, 1198, last(AC_DrainChannel), 0, 0) if last(AC_DrainChannel) < 1197
    submatrix(AC_DrainChannel, 1198, 1796, 0, 0) otherwise
AC_EntranceTankB :=
    submatrix(AC_EntranceTank, 599, last(AC_EntranceTank), 0, 0) if last(AC_EntranceTank) < 1197
    submatrix(AC_EntranceTank, 599, 1197, 0, 0) otherwise
AC_DrainChannelC :=
    submatrix(AC_DrainChannel, 1198, last(AC_DrainChannel), 0, 0) if last(AC_DrainChannel) < 1796
    submatrix(AC_DrainChannel, 1198, 1796, 0, 0) otherwise
AC_EntranceTankC :=
    submatrix(AC_EntranceTank, 1198, last(AC_EntranceTank), 0, 0) if last(AC_EntranceTank) < 1796
    submatrix(AC_EntranceTank, 1198, 1796, 0, 0) otherwise
AC_OperatorAccessA :=
    AC_OperatorAccess if last(AC_OperatorAccess) < 598
    submatrix(AC_OperatorAccess, 0, 598, 0, 0) otherwise
AC_OperatorAccessB :=
    submatrix(AC_OperatorAccess, 599, last(AC_OperatorAccess), 0, 0) if last(AC_OperatorAccess) < 1197
    submatrix(AC_OperatorAccess, 599, 1197, 0, 0) otherwise
AC_OperatorAccessC :=
    submatrix(AC_OperatorAccess, 1198, last(AC_OperatorAccess), 0, 0) if last(AC_OperatorAccess) < 1796
    submatrix(AC_OperatorAccess, 1198, 1796, 0, 0) otherwise
AC_ZZMatApplyA :=
    AC_MatApply if last(AC_MatApply) < 598
    submatrix(AC_MatApply, 0, 598, 0, 0) otherwise
AC_ZZLayoutA :=
    AC_Layout if last(AC_Layout) < 598
    submatrix(AC_Layout, 0, 598, 0, 0) otherwise
AC_ZZMatApplyB :=
    submatrix(AC_MatApply, 1198, last(AC_MatApply), 0, 0) if last(AC_MatApply) < 1197
    submatrix(AC_MatApply, 1198, 1796, 0, 0) otherwise
AC_ZZLayoutB :=
    submatrix(AC_Layout, 1198, last(AC_Layout), 0, 0) if last(AC_Layout) < 1197
    submatrix(AC_Layout, 1198, 1796, 0, 0) otherwise
AC_ZZLayoutC :=
    submatrix(AC_Layout, 1198, last(AC_Layout), 0, 0) if last(AC_Layout) < 1796
    submatrix(AC_Layout, 1198, 1796, 0, 0) otherwise
AC_ZZMatApplyC :=
    submatrix(AC_MatApply, 1198, last(AC_MatApply), 0, 0) if last(AC_MatApply) < 1796
    submatrix(AC_MatApply, 1198, 1796, 0, 0) otherwise
## Display AC variables
AC_EntranceTankA = [
    "-layer m EtTankCon"; "c t 132,132,132"; "EtTankCon"; "  "; "_-view o t _zoom w 0.16,18.6478,1.14982 -7.46467,20.37026,2.36426"; "_box 0,18.8078,1.14982 -7.30467,20.21026,2.36426 _box 0.15,18.6578,0.99982 -7.45467,20.36026,2.36426"; "_subtract 0.15,18.6578,0.99982  0,18.8078,1.14982 "; "-group c EtTankCon y "; "all "; "-layer s 0"
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]
AC_EntranceTankB = [
    "all "; "-layer s 0"; "  "; "-layer f EtRmPipePlu"; "  "; "-layer m EtRmTeePlu"; "c t 0,255,0"; "EtRmTeePlu"; "  "; "_cylinder -6.98559,18.2904,1.14126 0.254 a -6.98559,17.9094,1.14126"
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]
AC_EntranceTankC =  # error
AC_FlocTankA = [
    "-layer m FlocTankCon"; "c t 132,132,132"; "FlocTankCon"; "  "; "_-view o t _zoom w 0.16,12.74,0 -7.46467,16.79,2.02338"; "_box 0,12.9,0 -7.30467,16.63,2.02338 _box 0.15,12.75,-0.15 -7.45467,16.78,2.02338"; "_subtract 0.15,12.75,-0.15  0,12.9,0 "; "_box -7.45467,13.72,0 0.15,13.87,2.02338"; "-array l  R 3 1 0.97"; "-group c FlocTankCon y "
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]
AC_FlocTankB = [
    "  ";
    "_zoom w 0.32098,13.23571,0.06429 0.09302,13.38429,-0.06429";
    "_cylinder 0.264,13.31,0 0.06429 a 0.207,13.31,0";
    "_cylinder 0.274,13.31,0 0.05715 a 0.197,13.31,0";
    "_subtract 0.264,13.24571,0  0.274,13.25285,0 ";
    "_cylinder 0.207,13.31,0 0.05715 a 0.16002,13.31,0";
    "_cylinder 0.217,13.31,0 0.0525 a 0.15002,13.31,0";
    "_subtract 0.16002,13.25285,0  0.15002,13.2575,0 ";
    "_union 0.16002,13.31,0 0.264,13.31,0 ";
    "rotate3d l  z 0.207,13.31,0 180"
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]
AC_FlocTankD =  # error
AC_FlocTankC =  # error
AC_OperatorAccessA =  # error
AC_OperatorAccessC =  # error
AC_OperatorAccessB =  # error
AC_SedTankA = [
    "-layer m SedTankCon"; "c t 132,132,132"; "SedTankCon"; "  "; "_-view o r"; "_pline"; "2.05,0"; "1.54825,0"; "1.54825,0.0965"; "1.56825,0.0965"
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]
AC_SedTankB = [
    "_union -7.91132,1.5,0.03935 -7.80734,1.5,0.03935 "; "rotate3d l  z -7.86434,1.5,0.03935 180"; "-group c SedSludgeAdapterPlu y "; "all "; "-layer s 0"; "  "; "-layer f SedSludgeAdapterPlu"; "  "; "-layer m SedSludgeValvePlu"; "c t 0,127,255"
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]
AC_SedTankC = [
    "-layer m SedEChannelHorizCouplingPlu";
    "c t 0,255,0";
    "SedEChannelHorizCouplingPlu";
    "  ";
    "_zoom w -7.52867,0.04,0.30054 -7.08957,0.29654,0.064";
    "_cylinder -7.30912,0.16827,0.18227 0.11827 a -7.24512,0.16827,0.18227";
    "_cylinder -7.45467,0.16827,0.18227 0.11827 a -7.39067,0.16827,0.18227";
    "_cylinder -7.39067,0.16827,0.18227 0.10954 a -7.30912,0.16827,0.18227";
    "_union -7.24512,0.05,0.18227 -7.45467,0.05,0.18227 -7.30912,0.05873,0.18227 ";
    "-group c DeleteMe y "
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]
AC_ChemTanksA = [
    "-layer m CoagTanks"; "c t 132,132,132"; "CoagTanks"; "  "; "_-view o t"; "_zoom w -10.17632,18.64026,1.01196 -8.59632,20.22026,2.68696"; "_cylinder -9.38632,19.43026,2.67696 0.78 a -11.04132,19.43026,2.67696"; "rotate3d l  y -9.38632,19.43026,2.67696 90"; "-group c CoagTanks y "; "all "
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]
AC_ChemTanksB = [
    "_mirror -11.77537,19.79931,2.482  -11.77537,19.78026 -11.76537,19.79026 n _union -11.74243,19.77772,2.482 -11.7619,19.79373,2.482 -11.77537,19.8132,2.482 ";
    "rotate3d l  z -11.75632,19.78026,2.482 90";
    "rotate3d l  y -11.75632,19.78026,2.482 270";
    "_-view o t";
    "_zoom w -11.81831,18.58337,2.43906 -11.73243,18.66926,2.48684 _torus -11.77537,18.62632,2.46295 0.01905 0.01067 _box -11.81509,18.5866,2.44229 -11.77537,18.66603,2.48362 _subtract -11.74565,18.62632,2.46295  -11.81509,18.5866,2.44229 ";
    "_torus -11.77537,18.62632,2.46295 0.01905 0.00966 _subtract -11.74565,18.62632,2.46295  -11.80408,18.62632,2.46295  _box -11.78537,18.5866,2.44229 -11.73565,18.62632,2.48362 _subtract -11.77537,18.65603,2.46295  -11.78537,18.5866,2.44229 ";
    "_cylinder -11.77537,18.64537,2.46295 0.01389 a -11.77791,18.64537,2.46295 _cylinder -11.76537,18.64537,2.46295 0.01067 a -11.78791,18.64537,2.46295 _subtract -11.77537,18.63147,2.46295  -11.76537,18.6347,2.46295 ";
    "_mirror -11.77537,18.64537,2.46295  -11.77537,18.62632 -11.76537,18.63632 n _union -11.74243,18.62378,2.46295 -11.7619,18.63979,2.46295 -11.77537,18.65926,2.46295 ";
    "rotate3d l  z -11.75632,18.62632,2.46295 180";
    "_-view o t"
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]
AC_ChemTanksC =  # error
AC_DrainChannelA =  # error
AC_DrainChannelB =  # error
AC_DrainChannelC =  # error
AC_ZPlantLayout = ["-layer t Floc*"; "  "; "mirror3d all  yz -3.65234,0 y  "; "-layer s 0"; "  "; "-layer f Floc*"; "  "]
AC_FilterA =  # error
AC_FilterD =  # error
AC_FilterB =  # error
AC_FilterC =  # error
HW_Sed = 1.82856 m
# this variable is displayed to ensure that LabView can read AC.ZZEnd (error in LabView "read mathcad file" code that it misses the last variable)
AC_CdcA = [
    "-layer m Cdc";
    "c t 125,0,160";
    "Cdc";
    "  ";
    "-insert https://confluence.cornell.edu/download/attachments/173604905/CdcLeverArm.dwg";
    "-7.03402,18.94987,2.38916 x 1 1  270";
    "-insert https://confluence.cornell.edu/download/attachments/173604905/CdcLeverArmBracket.dwg";
    "-7.44677,18.91787,2.36426 x 1 1  270";
    "-insert https://confluence.cornell.edu/download/attachments/173604905/CdcCht.dwg";
    "-8.38012,18.94987,2.48196 x 1 1  90"
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]
AC_CdcC =  # error
AC_CdcB =  # error
# AC_ZZMatApplyA | AC_ZZMatApplyB
AC_ZZMatApplyC
AC_ZZLayoutA = [
    "laythw"; "-layout t AguaClara 0"; "View"; "layout d Layout1"; " d Layout2"; "layout r View"; "TopView"; "layout s TopView"; ".ms"; "z o all "
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]
AC_ZZLayoutC =  # error
AC_ZZLayoutB =  # error
Q_Plant = 0.07 m^3/s
