TopView :=
    NewLayout ← concat("layout", sp, "n", sp, "TopView")
    SetLayout ← concat("layout", sp, "s", sp, "TopView")
    TopView ← concat(viewtop, "all")
    return stack(NewLayout, SetLayout, TopView)
FrontView :=
    NewLayout ← concat("layout", sp, "n", sp, "FrontView")
    SetLayout ← concat("layout", sp, "s", sp, "FrontView")
    FrontView ← concat(viewfront, "all")
    return stack(NewLayout, SetLayout, FrontView)
LeftView :=
    NewLayout ← concat("layout", sp, "n", sp, "LeftView")
    SetLayout ← concat("layout", sp, "s", sp, "LeftView")
    LeftView ← concat(viewleftside, sp, "all")
    return stack(NewLayout, SetLayout, LeftView)
RightView :=
    NewLayout ← concat("layout", sp, "n", sp, "RightView")
    SetLayout ← concat("layout", sp, "s", sp, "RightView")
    RightView ← concat(viewrightside, "all")
    return stack(NewLayout, SetLayout, RightView)
FreezeVPMultiple(LayerVector) :=
    Local ← concat("vplayer", sp, "f", sp, LayerVector[0])
    for i ∈ 1 .. last(LayerVector)
        Local ← stack(Local, concat(sp, sp, sp, "f", sp, LayerVector[i]))
    return stack(Local, sp)
SedTankLayers := [
    "channel";
    "tank";
    "bottomslopes";
    "echannel";
    "echanneltank";
    "lamina";
    "pipeframe support";
    "pipeframe";
    "connecting pipe";
    "ichanneltank";
    "WasteElbow";
    "draincover";
    "launder";
    "manifoldpipe";
    "manifoldelbow";
    "SedDrainCoupling";
    "SedDrainPipe";
    "SedDrainAdapter";
    "SedDrainValves";
    "launder cap";
    "sedweirinlet";
    "sedweirexit";
    "inletweirtee";
    "weirpipecap";
    "laundercouplingcap";
    "exitweirelbow";
    "exitweir";
    "launderorificecap";
    "launder coupling";
    "inletweir";
    "wastepipe";
    "exitweirelbow";
    "inletpipe";
    "chimney stops";
    "iccoupling"
]
FreezeVPLayer(LayerName) := stack(concat("vplayer", sp, "f", sp, LayerName), concat(sp, sp, sp))
EntranceTankLayers := ["entrancetank"; "MicroMixOrifice"; "RMPipe"; "RMCoupling"; "RMElbow"; "RMElbow2"; "RMCoupling2"]
FlocTankLayers := ["floctank"; "Baffle"; "FlocDrainCoupling"; "FlocDrainPipe"; "FlocDrainAdapter"; "FlocDrainValve"]
TopViewEntrance :=
    NewLayout ← concat("layout", sp, "n", sp, "TopViewEntranceTank")
    SetLayout ← concat("layout", sp, "s", sp, "TopViewEntranceTank")
    SwitchSpace ← ".ms"
    FreezeFloc ← FreezeVPMultiple(FlocTankLayers)
    FreezeTanks ← FreezeVPLayer("alumtanks")
    FreezeSed ← FreezeVPMultiple(SedTankLayers)
    TopView ← concat(viewtop, "all")
    return stack(NewLayout, SetLayout, SwitchSpace, FreezeFloc, FreezeTanks, FreezeSed, TopView)
RightViewEntrance :=
    NewLayout ← concat("layout", sp, "n", sp, "RightViewEntranceTank")
    SetLayout ← concat("layout", sp, "s", sp, "RightViewEntranceTank")
    SwitchSpace ← ".ms"
    FreezeFloc ← FreezeVPMultiple(FlocTankLayers)
    FreezeTanks ← FreezeVPLayer("alumtanks")
    FreezeSed ← FreezeVPMultiple(SedTankLayers)
    RightView ← concat(viewrightside, "all")
    return stack(NewLayout, SetLayout, SwitchSpace, FreezeFloc, FreezeTanks, FreezeSed, RightView)
LeftViewEntrance :=
    NewLayout ← concat("layout", sp, "n", sp, "LeftViewEntranceTank")
    SetLayout ← concat("layout", sp, "s", sp, "LeftViewEntranceTank")
    SwitchSpace ← ".ms"
    FreezeFloc ← FreezeVPMultiple(FlocTankLayers)
    FreezeTanks ← FreezeVPLayer("alumtanks")
    FreezeSed ← FreezeVPMultiple(SedTankLayers)
    LeftView ← concat(viewleftside, sp, "all")
    return stack(NewLayout, SetLayout, SwitchSpace, FreezeFloc, FreezeTanks, FreezeSed, LeftView)
FrontViewEntrance :=
    NewLayout ← concat("layout", sp, "n", sp, "LeftViewEntranceTank")
    SetLayout ← concat("layout", sp, "s", sp, "LeftViewEntranceTank")
    SwitchSpace ← ".ms"
    FreezeFloc ← FreezeVPMultiple(FlocTankLayers)
    FreezeTanks ← FreezeVPLayer("alumtanks")
    FreezeSed ← FreezeVPMultiple(SedTankLayers)
    FrontView ← concat(viewfront, "all")
    return stack(NewLayout, SetLayout, SwitchSpace, FreezeFloc, FreezeTanks, FreezeSed, FrontView)
TopViewFloc :=
    NewLayout ← concat("layout", sp, "n", sp, "TopViewFlocTank")
    SetLayout ← concat("layout", sp, "s", sp, "TopViewFlocTank")
    SwitchSpace ← ".ms"
    FreezeEntrance ← FreezeVPMultiple(EntranceTankLayers)
    FreezeTanks ← FreezeVPLayer("alumtanks")
    FreezeSed ← FreezeVPMultiple(SedTankLayers)
    TopView ← concat(viewtop, "all")
    return stack(NewLayout, SetLayout, SwitchSpace, FreezeEntrance, FreezeTanks, FreezeSed, TopView)
RightViewFloc :=
    NewLayout ← concat("layout", sp, "n", sp, "RightViewFlocTank")
    SetLayout ← concat("layout", sp, "s", sp, "RightViewFlocTank")
    SwitchSpace ← ".ms"
    FreezeEntrance ← FreezeVPMultiple(EntranceTankLayers)
    FreezeTanks ← FreezeVPLayer("alumtanks")
    FreezeSed ← FreezeVPMultiple(SedTankLayers)
    RightView ← concat(viewrightside, "all")
    return stack(NewLayout, SetLayout, SwitchSpace, FreezeEntrance, FreezeTanks, FreezeSed, RightView)
LeftViewFloc :=
    NewLayout ← concat("layout", sp, "n", sp, "LeftViewFlocTank")
    SetLayout ← concat("layout", sp, "s", sp, "LeftViewEntranceTank")
    SwitchSpace ← ".ms"
    FreezeEntrance ← FreezeVPMultiple(EntranceTankLayers)
    FreezeTanks ← FreezeVPLayer("alumtanks")
    FreezeSed ← FreezeVPMultiple(SedTankLayers)
    LeftView ← concat(viewleftside, sp, "all")
    return stack(NewLayout, SetLayout, SwitchSpace, FreezeEntrance, FreezeTanks, FreezeSed, LeftView)
FrontViewFloc :=
    NewLayout ← concat("layout", sp, "n", sp, "FrontViewFlocTank")
    SetLayout ← concat("layout", sp, "s", sp, "FrontViewFlocTank")
    SwitchSpace ← ".ms"
    FreezeEntrance ← FreezeVPMultiple(EntranceTankLayers)
    FreezeTanks ← FreezeVPLayer("alumtanks")
    FreezeSed ← FreezeVPMultiple(SedTankLayers)
    FrontView ← concat(viewfront, "all")
    return stack(NewLayout, SetLayout, SwitchSpace, FreezeEntrance, FreezeTanks, FreezeSed, FrontView)
TopViewSed :=
    NewLayout ← concat("layout", sp, "n", sp, "TopViewSedTank")
    SetLayout ← concat("layout", sp, "s", sp, "TopViewSedTank")
    SwitchSpace ← ".ms"
    FreezeEntrance ← FreezeVPMultiple(EntranceTankLayers)
    FreezeTanks ← FreezeVPLayer("alumtanks")
    FreezeFloc ← FreezeVPMultiple(FlocTankLayers)
    TopView ← concat(viewtop, "all")
    return stack(NewLayout, SetLayout, SwitchSpace, FreezeEntrance, FreezeTanks, FreezeFloc, TopView)
RightViewSed :=
    NewLayout ← concat("layout", sp, "n", sp, "RightViewSedTank")
    SetLayout ← concat("layout", sp, "s", sp, "RightViewSedTank")
    SwitchSpace ← ".ms"
    FreezeEntrance ← FreezeVPMultiple(EntranceTankLayers)
    FreezeTanks ← FreezeVPLayer("alumtanks")
    FreezeFloc ← FreezeVPMultiple(FlocTankLayers)
    RightView ← concat(viewrightside, "all")
    return stack(NewLayout, SetLayout, SwitchSpace, FreezeEntrance, FreezeTanks, FreezeFloc, RightView)
LeftViewSed :=
    NewLayout ← concat("layout", sp, "n", sp, "LeftViewSedTank")
    SetLayout ← concat("layout", sp, "s", sp, "LeftViewSedTank")
    SwitchSpace ← ".ms"
    FreezeEntrance ← FreezeVPMultiple(EntranceTankLayers)
    FreezeTanks ← FreezeVPLayer("alumtanks")
    FreezeFloc ← FreezeVPMultiple(FlocTankLayers)
    LeftView ← concat(viewleftside, sp, "all")
    return stack(NewLayout, SetLayout, SwitchSpace, FreezeEntrance, FreezeTanks, FreezeFloc, LeftView)
FrontViewSed :=
    NewLayout ← concat("layout", sp, "n", sp, "FrontViewSedTank")
    SetLayout ← concat("layout", sp, "s", sp, "FrontViewSedTank")
    SwitchSpace ← ".ms"
    FreezeEntrance ← FreezeVPMultiple(EntranceTankLayers)
    FreezeTanks ← FreezeVPLayer("alumtanks")
    FreezeFloc ← FreezeVPMultiple(FlocTankLayers)
    FrontView ← concat(viewfront1)
    return stack(NewLayout, SetLayout, SwitchSpace, FreezeEntrance, FreezeTanks, FreezeFloc, FrontView)
AC_Layout := stack(TopView, FrontView, RightView, TopViewEntrance, RightViewEntrance, FrontViewEntrance, TopViewFloc, RightViewFloc, FrontViewFloc, TopViewSed, RightViewSed, FrontViewSed)
