# Operator Access
# [reference: MasterProgram.xmcd]
# Coagulant Platform
CoagPlatform_Origin := [
    CoagTank_Origin[0] - 3*(R_CoagTank + T_ChemTankWall) - 2*S_ChemTanks;
    Et_Origin[1] - T_PlantWall;
    Plant_Origin[2] + H_Sed - H_WalkwayToTankWall
]
CoagPlatform_Dimensions := [
    4*(R_CoagTank + T_ChemTankWall) + 3*S_ChemTanks;
    2*(R_CoagTank + T_ChemTankWall) + S_ChemTanks + S_ChemTankToWall;
    CoagTank_Origin[2] - T_ChemTankWall - H_Sed + H_WalkwayToTankWall
]
H_CoagStairs := CoagPlatform_Dimensions[2]
W_CoagStairs := CoagPlatform_Dimensions[1]
CoagStairs_Origin := CoagPlatform_Origin + [0 m; 0 m; CoagPlatform_Dimensions[2]]
OpAccessLayer := layer_new("OpWalkwayCon", grey)
PlatformStairs := Stairs(CoagStairs_Origin, W_CoagStairs, H_CoagStairs, 180 deg)
PlatformBox := BoxF(CoagPlatform_Origin, CoagPlatform_Origin + CoagPlatform_Dimensions, [0; 0; 0]*deg)
PlatformSpillGuard := BoxF(CoagPlatform_Origin + CoagPlatform_Dimensions, CoagPlatform_Origin + CoagPlatform_Dimensions + [-T_ConcreteMin; -CoagPlatform_Dimensions[1]; T_ConcreteMin], [0; 0; 0]*deg)
Mirror := Mirror3dAll("YZ", [Plant_Origin[0] - 1/2*L_Sed; 0 m; 0 m], "Y")
# If the number of flocculator channels is even,
# the platform will be mirrored.
UnionPlatform1 := Union_All
FreezePlatformBox := FreezeLayer("OpCoagplatformCon")
CoagPlatformScript :=
    stack(OpAccessLayer, PlatformStairs, PlatformBox, PlatformSpillGuard, UnionPlatform1, FreezePlatformBox) if mod(N_FlocChannels, 2) == 0
    stack(OpAccessLayer, PlatformStairs, PlatformBox, PlatformSpillGuard, Mirror, UnionPlatform1, FreezePlatformBox) otherwise
# Drain Channel Walkway Floor
# Draws the floor over the main plant drain channel, to the right of the tanks.
DCWalkway_Origin := [
    Plant_Origin[0] + T_PlantWall;
    Plant_Origin[1];
    Plant_Origin[2] + H_Sed - H_WalkwayToTankWall - T_Floor
]
DCWalkway_Dimensions := [
    W_DCWalkway;
    N_SedTanks*(W_Sed + T_PlantWall) + N_FlocChannels*(W_FlocChannel + T_PlantWall) + W_EtWalkway + CouplingLength(ND_RMPipe) + ElbowRadius(ND_RMPipe) + ShortTeeLength(ND_RMPipe) + T_PlantWall + W_Et;
    T_Floor
]
SedDrainBoxes_Dimensions := [
    L_SedSludgeValvePipe - 2*SocketDepth(ND_SedSludgePipe) + 2*MaleAdapterLength(ND_SedSludgePipe) + ValveLength(ND_SedSludgePipe) - ValveSocket(ND_SedSludgePipe);
    2*ND_SedSludgePipe;
    T_Floor
]
FlocDrainBoxes_Dimensions := [
    2*MaleAdapterLength(ND_FlocValve) + ValveLength(ND_FlocValve) - ValveSocket(ND_FlocValve);
    2*ND_FlocValve;
    T_Floor
]
EtDrainBox_Dimensions := [
    2*MaleAdapterLength(ND_EtFlowControl) + ValveLength(ND_EtFlowControl) - ValveSocket(ND_EtFlowControl);
    2*ND_EtFlowControl;
    T_Floor
]
FloorLayer := SelectLayer("OpWalkwayCon")
DCWalkwayBox := BoxF(DCWalkway_Origin, DCWalkway_Origin + DCWalkway_Dimensions, [0; 0; 0]*deg)
FreezeWalkway := FreezeLayer("OpWalkwayCon")
DrainBoxes :=
    Total ← BoxF([
        Plant_Origin[0] + T_PlantWall;
        W_SedBay*N_SedBays - 0.5*W_SedBay - ND_SedSludgePipe;
        DCWalkway_Origin[2]
    ], [
        Plant_Origin[0] + T_PlantWall;
        W_SedBay*N_SedBays - 0.5*W_SedBay - ND_SedSludgePipe;
        DCWalkway_Origin[2]
    ] + SedDrainBoxes_Dimensions, [0; 0; 0]*deg)
    if N_SedBays > 1
        for i ∈ 1 .. N_SedBays - 1
            Total ← stack(Total, BoxF([
                Plant_Origin[0] + T_PlantWall;
                W_SedBay*(N_SedBays - i) - 0.5*W_SedBay - ND_SedSludgePipe;
                DCWalkway_Origin[2]
            ], [
                Plant_Origin[0] + T_PlantWall;
                W_SedBay*(N_SedBays - i) - 0.5*W_SedBay - ND_SedSludgePipe;
                DCWalkway_Origin[2]
            ] + SedDrainBoxes_Dimensions, [0; 0; 0]*deg))
    Total ← stack(Total, array_all(N_SedTanks, 1, W_SedBay*N_SedBays + T_PlantWall)) if N_SedTanks > 1
    for j ∈ 0 .. last(Y_FlocDrainValves)
        Total ← stack(Total, BoxF([Plant_Origin[0] + T_PlantWall; Y_FlocDrainValves[j] - D_FlocValve; DCWalkway_Origin[2]], [Plant_Origin[0] + T_PlantWall; Y_FlocDrainValves[j] - D_FlocValve; DCWalkway_Origin[2]] + FlocDrainBoxes_Dimensions, [0; 0; 0]*deg))
    Total ← stack(Total, BoxF([
        Et_Origin[0] + T_PlantWall;
        Et_Origin[1] + S_Fitting + ConRadius(ND_EtDrain) - ND_EtFlowControl;
        DCWalkway_Origin[2]
    ], [
        Et_Origin[0] + T_PlantWall;
        Et_Origin[1] + S_Fitting + ConRadius(ND_EtDrain) - ND_EtFlowControl;
        DCWalkway_Origin[2]
    ] + EtDrainBox_Dimensions, [0; 0; 0]*deg))
    return Total
Subtract := SubtractF(["OpWalkwayCon"], "DeleteMe")
DCWalkway_Script := stack(FloorLayer, DCWalkwayBox, FreezeWalkway, DrainBoxes, GroupAll("DeleteMe"), Subtract)
# Coagulant Platform Floor
# Draws the floor beneath the coagulant stock platform and to the left of it, at the base of the stairs.
# Calculate the length of the stairs for the x coordinate. Also needs to be incorporated into other floor origin points below. Ultimately these layout dimensions should be better organized in the design tool so that they can be easily optimized.
CoagFloor_Origin := [
    CoagPlatform_Origin[0] - 4 m;
    CoagPlatform_Origin[1];
    Plant_Origin[2] + H_Sed - H_WalkwayToTankWall - T_Floor
]
CoagFloor_Dimensions := [4 m + CoagPlatform_Dimensions[0]; CoagPlatform_Dimensions[1]; T_Floor]
ThawFloor := SelectLayer("OpWalkwayCon")
FloorBox := BoxF(CoagFloor_Origin, CoagFloor_Origin + CoagFloor_Dimensions, [0; 0; 0]*deg)
CoagFloor_Script := stack(ThawFloor, FloorBox)
# Entrance Tank Walkway Floor
# The floor between the entrance tank and the flocculator, but extending all the way to the left-most wall of the plant.
EtWalkway_Origin := [
    Plant_Origin[0] + T_PlantWall;
    Et_Origin[1] - T_PlantWall;
    Plant_Origin[2] + H_Sed - H_WalkwayToTankWall - T_Floor
]
EtWalkway_Dimensions := [
    -L_Et - 2*T_PlantWall - CoagPlatform_Dimensions[0] - 4 m;
    -Et_Origin[1] + W_SedBay*N_SedBays*N_SedTanks + W_FlocChannel*N_FlocChannels + (N_SedTanks + N_FlocChannels + 1)*T_PlantWall;
    T_Floor
]
ThawWalkwayLayer := SelectLayer("OpWalkwayCon")
EtWalkwayBox := BoxF(EtWalkway_Origin, EtWalkway_Origin + EtWalkway_Dimensions, [0; 0; 0]*deg)
FreezeEtWalkway := FreezeLayer("OpWalkwayCon")
# space for the RM Pipe going through the walkway
RMCutout_Origin := [
    RMTee_Origin[0] - innerdiameter(ND_RMPipe, PS_Default);
    Et_Origin[1] - T_PlantWall;
    EtWalkway_Origin[2]
]
RMCutout_Dimensions := [2*innerdiameter(ND_RMPipe, PS_Default); -3*innerdiameter(ND_RMPipe, PS_Default); T_Floor]
RMCutoutBox := BoxF(RMCutout_Origin, RMCutout_Origin + RMCutout_Dimensions, [0; 0; 0]*deg)
SubtractRMCutout := SubtractF(["OpWalkwayCon"], "DeleteMe")
EtWalkway_Script := stack(ThawWalkwayLayer, EtWalkwayBox, FreezeEtWalkway, RMCutoutBox, GroupAll("DeleteMe"), SubtractRMCutout)
# Flocculator Floor
# The floor area to the left of the flocculator.
FlocFloor_Origin := [
    CoagFloor_Origin[0];
    CoagFloor_Origin[1] + EtWalkway_Dimensions[1];
    Plant_Origin[0] + H_Sed - H_WalkwayToTankWall - T_Floor
]
FlocFloor_Dimensions := [
    Floc_Origin[0] - Wall_Dim[0] - CoagFloor_Origin[0] + T_PlantWall;
    -TotalFloc_Dim[1] - Wall_Dim[1] - T_PlantWall;
    T_Floor
]
FlocFloor := BoxF(FlocFloor_Origin, FlocFloor_Origin + FlocFloor_Dimensions, [0; 0; 0]*deg)
FlocFloor_Script := stack(SelectLayer("OpWalkwayCon"), FlocFloor, FreezeLayer("OpWalkwayCon"))
# Sedimentation Tank Floor
SedFloor_Origin := [
    Plant_Origin[0] - L_Sed - T_PlantWall;
    Plant_Origin[1];
    Plant_Origin[2] + H_Sed - H_WalkwayToTankWall - T_Floor
]
SedFloor_Dimensions := [
    CoagFloor_Origin[0] + L_Sed + T_PlantWall;
    N_SedTanks*W_Sed + (N_SedTanks - 1)*T_PlantWall;
    T_Floor
]
SedFloor := BoxF(SedFloor_Origin, SedFloor_Origin + SedFloor_Dimensions, [0; 0; 0]*deg)
SedFloor_Script := stack(SelectLayer("OpWalkwayCon"), SedFloor, FreezeLayer("OpWalkwayCon"))
# Chlorine Tank Platform
ChlorineTank_Origin := [
    Plant_Origin[0] + 2.5*T_PlantWall + R_ChlorineTank;
    Plant_Origin[1] + T_ChemTankWall + R_ChlorineTank - 1 m;
    CoagTank_Origin[2]
]
ChlorPlatform_Dimensions := [
    2*(R_ChlorineTank + T_ChemTankWall) + S_ChemTankBorder + S_Operator;
    (4*R_ChlorineTank + 4*T_ChemTankWall) + 3*S_ChemTanks;
    -(ChlorineTank_Origin[2] - T_ChemTankWall - (H_Sed - H_WalkwayToTankWall))
]
H_ChlorineTotal := ChlorineTank_Origin[2] - T_ChemTankWall - (H_Sed - H_WalkwayToTankWall)
ChlorPlatform_Origin := [
    DCWalkway_Origin[0];
    DCWalkway_Origin[1] - ChlorPlatform_Dimensions[1];
    ChlorineTank_Origin[2] - T_ChemTankWall
]
ChlorStairs_Origin := [
    ChlorPlatform_Origin[0] + ChlorPlatform_Dimensions[0];
    ChlorPlatform_Origin[1] + ChlorPlatform_Dimensions[1];
    ChlorPlatform_Origin[2]
]
ChlorPlatformLayer := SelectLayer("OpWalkwayCon")
ChlorStairs := Stairs(ChlorStairs_Origin, ChlorPlatform_Dimensions[1], H_ChlorineTotal, 0 deg)
ChlorPlatformBox := BoxF(ChlorPlatform_Origin, ChlorPlatform_Origin + ChlorPlatform_Dimensions, [0; 0; 0]*deg)
UnionPlatform2 := Union_All
FreezeChlorPlatformBox := FreezeLayer("OpWalkwayCon")
ChlorPlatformScript := stack(ChlorPlatformLayer, ChlorStairs, ChlorPlatformBox, UnionPlatform2, FreezeChlorPlatformBox)
AC_OperatorAccess := stack(CoagPlatformScript, DCWalkway_Script, EtWalkway_Script, ChlorPlatformScript, CoagFloor_Script, FlocFloor_Script, SedFloor_Script, SelectLayer("OpWalkwayCon"), Union_All, FreezeLayer("OpWalkwayCon"))
# [component: inputs AC_OperatorAccess]
