# [reference: MasterProgram.xmcd]
BoxDist := 2 m
Headloss := 10 cm  # Arbitrary design variables.
# for box spacing and heights
FilterInletTank_origin := [
    echanneltank_origin[0] - T_PlantWall - W_ExitChannel;
    echanneltank_origin[1];
    echanneltank_origin[2]
] = [-0.523167; -0.57432; 1.38359] m
FilterInletBox_origin := [echannelbox_origin[0] - T_PlantWall; echannelbox_origin[1] - W_ExitChannel; echannelbox_origin[2]] = [-0.523167; -0.523167; 1.38359] m
filterinletbox_dim := [T_PlantWall; W_ExitChannel; H_ExitChannel] = [0.15; 0.373167; 0.355898] m
sedechanneltankscript :=
    viewtope ← viewtop1
    layernewect ← layer_new("echanneltank", ltgrey)
    tankect ← Tank(echanneltank_origin, echanneltank_dim, T_PlantWall)
    boxect ← box(echannelbox_origin, echannelbox_origin + echannelbox_dim)
    subtractect ← subtractD(echanneltank_origin, echannelbox_origin)
    layerset ← layer_set("0")
    layerfreezeect ← layer_freeze("echanneltank")
    one ← stack(viewtope, layernewect, tankect, boxect, subtractect, layerset, layerfreezeect)
    return one
# ***Drawn for reference***
FilterInletBoxscript :=
    viewtope ← viewtop1
    layernewfib ← layer_new("SRSF inlet box", ltgrey)
    tankfib ← Tank(FilterInletTank_origin, echanneltank_dim, T_PlantWall)
    boxfib ← box(FilterInletBox_origin, FilterInletBox_origin + filterinletbox_dim)
    subtractfib ← subtractD(FilterInletTank_origin, filterinletbox_dim)
    layerset ← layer_set("0")
    layerfreezefib ← layer_freeze("SRSF inlet box")
    one ← stack(viewtope, layernewfib, tankfib, boxfib, layerset, layerfreezefib)
    return one
# ***Subtract for weir is not complete***
FilterOutletBoxscript :=
    viewtope ← viewtop1
    layernewfob ← layer_new("SRSF outlet box", ltgrey)
    tankfob ← Tank([
        FilterInletTank_origin[0];
        FilterInletTank_origin[1] - BoxDist;
        FilterInletTank_origin[2] - Headloss
    ], echanneltank_dim, T_PlantWall)
    boxfob ← box([FilterInletBox_origin[0]; FilterInletBox_origin[1] - BoxDist; FilterInletBox_origin[2] - Headloss], [FilterInletBox_origin[0]; FilterInletBox_origin[1] - BoxDist; FilterInletBox_origin[2] - Headloss] + filterinletbox_dim)
    subtractfob ← subtractD([
        FilterInletTank_origin[0];
        FilterInletTank_origin[1] - BoxDist;
        FilterInletTank_origin[2] - Headloss
    ], filterinletbox_dim)
    layerset ← layer_set("0")
    layerfreezefob ← layer_freeze("SRSF outlet box")
    one ← stack(viewtope, layernewfob, tankfob, boxfob, layerset, layerfreezefob)
    return one
filterscript :=
    viewtope ← viewtop1
    layernewfilt ← layer_new("SRSF", ltgrey)
    tankfilt ← Tank([
        FilterInletTank_origin[0];
        FilterInletTank_origin[1] - BoxDist/2;
        FilterInletTank_origin[2] - H_Sed
    ], [echanneltank_dim[0]; echanneltank_dim[1]; echanneltank_dim[2] + H_Sed], T_PlantWall)
    boxfilt ← box([FilterInletBox_origin[0]; FilterInletBox_origin[1] - BoxDist/2; FilterInletBox_origin[2] - H_Sed], [FilterInletBox_origin[0]; FilterInletBox_origin[1] - BoxDist/2; FilterInletBox_origin[2] - H_Sed] + [filterinletbox_dim[0]; filterinletbox_dim[1]; filterinletbox_dim[2] + H_Sed])
    subtractfilt ← subtractD([
        FilterInletTank_origin[0];
        FilterInletTank_origin[1] - BoxDist/2;
        FilterInletTank_origin[2] - H_Sed
    ], [filterinletbox_dim[0]; filterinletbox_dim[1]; filterinletbox_dim[2] + H_Sed])
    layerset ← layer_set("0")
    layerfreezefilt ← layer_freeze("SRSF")
    one ← stack(viewtope, layernewfilt, tankfilt, boxfilt, layerset, layerfreezefilt)
    return one
AC_Filter := stack(sedechanneltankscript, FilterInletBoxscript, FilterOutletBoxscript, filterscript)
# [component: inputs AC_Filter]
