# BASIC Client INPUTS
# Overall Plant Inputs
# Only parameters with units need to be entered in this file. The units must be attached as SI (meters, kg, s)
Q_Plant := Q_Plant*m^3/s
T_PlantWall := T_PlantWall*m
T_ConcreteMin := T_ConcreteMin*m
# Chemical Storage Tanks, Entrance Tank
# and Rapid Mixer Inputs
C_AlumDoseMax := C_AlumDoseMax*kg/m^3
C_AlumStock := C_AlumStock*kg/m^3
Ti_AlumStock := Ti_AlumStock*s
# Flocculator Inputs
T_FlocBaffleRigidV := T_FlocBaffleRigidV*m
T_FlocBaffleRigidH := T_FlocBaffleRigidH*m
# Sedimentation Inputs
W_SedPlate := W_SedPlate*m
L_SedPlateSheet := L_SedPlateSheet*m
T_SedPlate := T_SedPlate*m
T_SedWeir := T_SedWeir*m
# code fixes to handle poor definition of input variables. These variables need to be replaced in all code and in the VNG
EN_FcmTube := EN_TubeSeries  # error: This variable is undefined.
EN_PipeSpec := EN_PipeSeries  # error: This variable is undefined.
# There are no 1/2 and 3/4 in pipes for pipe schedules SDR 21 and SDR 26, respectively.  Therefore if the user specifies an SDR pipe spec, the largest possible pipe spec is chosen where these sizes are available.  When calling functions for these size pipes (i.e. innerD()), use the EN.PipeSpec12 or EN.PipeSpec34
EN_PipeSpec12 :=
    6 if EN_PipeSpec ≥ 7
    EN_PipeSpec otherwise  # error: This variable is undefined.
EN_PipeSpec34 :=
    7 if EN_PipeSpec ≥ 8
    EN_PipeSpec otherwise  # error: This variable is undefined.
W_SedBay := W_SedPlate
W_Plastic := W_SedPlate
C_FcmDoseMax := C_AlumDoseMax
C_FcmAlum := C_AlumStock
Ti_StockMin := Ti_AlumStock
T_FlocBaffle := T_FlocBaffleRigidH  # Until new variables are used in the code. Then this can be eliminated.
