# Expert Inputs
# Tabulated Constants
Rho_H2O := 1000*kg/m^3  # Density of water  # can we standardize so that we only use either H2O or water?
Nu_Water := 1*10^-6*m^2/s  # The kinematic viscosity of water.
Rho_FB := 1001*kg/m^3  # Density of Flocs
Re_PipeTransition := 2100
E_Pvc := 0.12 mm
E_Concrete := 2 mm
E_ConcreteLedge := 0.014 mm
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Pi_Jet := 0.4
# This is an empirically determined factor to make the equation
# correct.
# Design Assumptions
# General
W_HumanMin := 0.60 m  # Increased to 60 cm to make construction easier.
acad_version := 2008
H_Freefall := 0.1 m
H_PlantFreeboard := 0.1*m
EN_PlantDrains := 1  # Set to zero if drains on left, 1 if drains on right
Plant_Origin := [0; 0; 0]*m
ND_Rebar := 1/2*in
S_Fitting := 5 cm  # minimum space between fittings in a tank
W_ChannelMin := 10 cm  # Minimum channel width for constructability
S_ChannelPipeWall := 2 cm  # Extra space allowed on both sides of pipe to avoid interference with the channel walls
Π_Rectangular := 1/2  # Π.Rectangular is defined as the optimum "height over width ratio" (1/2) for a rectangular open channel
# Entrance Tank
AN_EtSlope := 45 deg  # Angle of the sloped walls of the entrance tank hoppers
V_EtUp := 8*mm/s
HL_EtFloc := 5 cm
HW_EtMin := 20 cm  # Minimum water level in the entrance tank
# Rapid Mix
HL_RMPipeEst := 10 cm
ED_RMMicroOrifice := 1*W/kg
L_RmPipe := 20 cm
# The total pipe length between the orifices and the flocculator (rapid mix pipe) .
N_RmEl := 0
# Pipe connecting the Grit chamber to the floc tank has three elbows. Based on how the AutoCAD team draws this pipe. The minor loss coefficient for this is K.el90
N_RmTee := 0
# Pipe connecting the Grit chamber to the floc tank has one T. Based on how the AutoCAD team draws this pipe. The minor loss coefficient for this is either K.Tflowbr
HL_RmDesign := 20 cm
# This is the allowable head loss through the rapid mix pipe and is what is used to size the pipes from the grit chamber to the flocculator AND the flow measurement tubes in the grit chamber
Pi_Dmix := 2.4  # ratio of diffusion length scale to kolmogorov length scale (smallest eddies in turbulent flow)
Tau_diffusion := 10 s  # time scale of diffusion
D_m := 0.673*10^-5*cm^2/s  # Diffusion coefficient
# Flow Orifice Meter
Π_Lfomorifice := 10  # Number of rows in lfom.  note: execution time of the lfom file exponentially increases with this number.
Π_LfomSafety := 1.5  # sefety coefficient for lfom pipe diameter
HL_Nlfom := 40 cm  # head loss through nonlinear orifice meter (simple orifice)
HL_Lfom := 20 cm  # head loss through linear orifice meter (sutro weir analog)
HL_Cdc := HL_Lfom
H_LfomSF := 5 cm
N_Lfom := 1
# Both of these assumptions were tested over a range of flow rates and found to give reasonable Lfom configurations.
# Difference between the height of the water in floc tank and the bottom set of holes on the linear flow orifice meter
H_LfomFreefall := 5 cm
HL_Lfom := 20 cm  # Head loss through the Lfom, and the minimum height of the water in the entrance tank.
B_LfomOrifice := 2 cm  # Veritical distance between orifices
H_dmax := 20 cm
Pi_Sutro := 0.1
Pi_Lfomorifice := 20
D_DrillEng :=
    i ← 0
    D_DrillEng[0] ← 1/32*in
    while D_DrillEng[i] ≤ 3/16*in - 1/128*in
        i ← i + 1
        D_DrillEng[i] ← D_DrillEng[i - 1] + 1/128*in
    while D_DrillEng[i] < 1 in - 1/16*in
        i ← i + 1
        D_DrillEng[i] ← D_DrillEng[i - 1] + 1/16*in
    while D_DrillEng[i] < 2 in
        i ← i + 1
        D_DrillEng[i] ← D_DrillEng[i - 1] + 1/4*in
    return D_DrillEng
D_DrillMet :=
    i ← 0
    D_DrillMet[0] ← 0.5 mm
    while D_DrillMet[i] ≤ 5 mm - 0.1 mm
        i ← i + 1
        D_DrillMet[i] ← D_DrillMet[i - 1] + 0.1 mm
    while D_DrillMet[i] < 20 mm
        i ← i + 1
        D_DrillMet[i] ← D_DrillMet[i - 1] + 1 mm
    while D_DrillMet[i] < 50 mm
        i ← i + 1
        D_DrillMet[i] ← D_DrillMet[i - 1] + 2 mm
    return D_DrillMet
D_Drill :=
    D_Drill ← D_DrillEng if EN_DrillSeries == 0
    D_Drill ← D_DrillMet otherwise  # error: This variable is undefined.
# Chem Tanks
C_CoagulantMinDose := 8*mg/L
H_CoagTankAboveHeadTank := 30 cm
# This is the elevation difference between the outlet of the coagulant stock tanks and the water level in the constant head tank, which is set by the hydraulic head required to provide the desired max chemical flow rate through the float valve orifice in the CHT. It is treated as constant here to ensure a practical amount of space is left between the stock tanks and the CHT even when a float valve is selected which requires very little hydraulic head to deliver the required maximum chemical flow rate.
T_ChemTankWall := 5 mm
B_StockOutlet := 10 cm  # This is the distance from the bottom of the stock tanks to the outlets to allow space for solids to settle.
S_ChemTankBorder := 25 cm  # Distance between a tank and the border of the platform
S_ChemTanks := 40 cm
S_ChemTankToWall := 1 m  # Distance between the tanks and the wall for operator mobility.
# CDC
C_CoagDoseMax := 60*mg/L
# FCM
HL_FcmTube := 20 cm
HL_FcmValveFreefall := 5 cm
D_FcmValveOrifice := 0.093 in
HL_FcmInletDesign := 20 cm
L_FcmTubeMax := 3 m
ID_FcmTubeEnglish := [0.0625; 0.125; 0.17; 0.25; 0.3125; 0.375]*in
ID_FcmTubeMetric := [2; 3; 4; 5; 6; 7]*mm
# Flocculator
# The minor loss coefficient is 2. According to measurements at Agalteca and according to
# https://confluence.cornell.edu/display/AGUACLARA/PAHO+Water+Treatment+Publications (page 100 in chapter on flocculation)
K_FlocBaffle := 2
S_FlocBaffleSetBackPlastic := 2 cm
CP_Floc := 100 m^(2/3)  # increased to 100 at the request of Dan and Sarah
Pi_JSOptimal := 3
Pi_JSMin := 2
Pi_FlocBaffle := 1.5
# Ratio of space at the bottom of a baffle to the space between baffles. This used to be 1, but we have changed it to 1.5 to reduce the risk that the bottom of the flocculator will clog with sediment.
ED_Floc := 10*mW/kg
# Increased from 6 to 10 on 7/14/2011 to compensate for increase in Pi.Jet from 0.38 (in flocculator) and 0.34 (in ports, pipes, channels) to a new value of 0.4.
Ti_FlocDrain := 30 min
# Sed Tanks
V_SedUpBod := 1*mm/s  # changed from 0.8 mm/s to 1 mm/s  on 8/13/2011 to obtain a better upflow velocity in the bottom of sed tanks for floc blankets.
V_SedCBod := 0.12*mm/s
V_UpFlocHopper := 0.35*mm/s
# Changed from 60 to 50 on 8/13/2011 to reduce construction costs
AN_SedSlope := 50 deg  # Angle of the sloped bottom of the sed tank
AN_SedPlate := 60 deg
HL_SedChannelMax := 5 cm
# Maximum water level drop in the inlet sed channel that dumps flocculated water to waste and in the outlet sed channel that takes clarified water to the filter or to waste
HW_SedEst := 2 m
Pi_SedCell := 2
# This is equivalent to saying that all of the kinetic energy contained in the flow will be dissipated over a length scale of 2 times the smallest dimension of flow.
# Inlet Channel Assumptions:
S_SedInletChannelMin := 3 cm  # This is the space needed around the pipe delivering water from the inlet channel to the sed tank
Perpendicular_Weir := 0
Parallel_Weir := 1
HW_InletChannelMax := 0.5*m  # To make it easy to place pipe nipples in inlet pipes to block flow to sed tank
ED_SedInlet := ED_Floc
HL_SedWeirMax := 5 cm
# Manifold Assumptions
ND_SedManifoldMax := 12 in
B_SedManifoldPortEst := 10 cm
Pi_FlowManifold := 0.8
S_SedManToSlopeMin := 10 cm
# Minimum spacing between the side of the manifold pipe and the sloped walls of the tank. Not relevant if the manifold is lifted close to the height of the floc weir.
# Launder Assumptions
HL_SedLaunderBod := 4 cm  # target headloss in sed launders
Pi_Launder := 0.95
Pi_QLaunderOrifices := 0.80
B_SedLaunderOrificesEst := 10 cm
H_LamellaToLaunder := 5 cm  # Vertical distance from the top of the plate settlers to the bottom of the exit launder.
# Sludge Assumptions
Pi_QSludgeOrifices := 0.85
B_SedSludgeOrificesEst := 10 cm
Ti_SludgeDrain := 30 min
# Plate Settler Module Assumptions
N_SedPlateCol := 1  # number of columns of Plate Settlers - this is a constant!
Y_SedPlate := 0 cm
B_SedPlateMin := 2.5 cm + T_SedPlate  # error: This variable is undefined.
# This is to prevent floc roll up. We should specify this in a more fundamental way. (based on velocity gradients)
ND_SedModulePipe := 0.5 in  # This is the diameter of the pipe used to hold the lamina together
ND_SedModulePipeSpace := 3/4*in  # This is the diameter of the ledge that serves as a ledge for the plate setter to lie on.
S_SedPlateModuleMin := 2 cm
L_SedPlateCantilevered := 20 cm
# Maximum length of sed plate sticking out past module pipes without any additional support. The goal is to prevent floppy modules that don't maintain constant distances between the plates
# Plate Settler Frame Assumptions
ND_SedPlateFrame := 1.5 in
B_SedFrameSupport := 1/3*m
# Thickness of Flange
T_Flange := 1 cm
ND_SedFrameStub := 1/2*in
# Distance from the wall to the vertical pipe of the main plate settler support frame
B_SedPlateFrameVertical := 10 cm
# Diameter of Flange
D_Flange := 6 in
# Floc Weir
H_SedFlocWeir := 80 cm  # The vertical distance from the top lip of the jet reverser to the floc weir.
H_FlocWeirToLamella := 10 cm  # Vertical distance from the top of the floc weir to the bottom of the plate pipe frame.
L_FlocHopperEst := 1 m
# Filter
# Eventually separate create specific variables for each wall thickness so that after the structural analysis is done we can update the variables here.
# Wall Thicknesses
T_PltWall := T_PlantWall  # error: This variable is undefined.
T_EtWall := T_PlantWall  # error: This variable is undefined.
T_ChannelWall := T_PlantWall  # error: This variable is undefined.
# Operator Access
W_MpWalkway := 1*m  # combine walkway assumptions!
S_Walkway := 1.5 m
W_EtWalkway := 1.5 m
