# AguaClara Water Treatment Plants
# Automated Design
# Add variable descriptions next to every varible so it is easy to interpret what this all means.
# Design References
# [reference: BasicInputs3Sed3Bays.xmcd]
# Use BasicClientInputs and ExpertClientInputs when this is run by LabVIEW.
# Use BasicInputs and ExpertInputs to use the program in MathCAD
# Change the reference by
# - right clicking
# - select properties
# - reference tab
# - type in the correct file name
# [reference: ExpertInputs.xmcd]
# [reference: DesignAssumptions.xmcd]
# [reference: MathFunctions.xmcd]
# [reference: PipeDatabase.xmcd]
# [reference: MinorLossCoefficients.xmcd]
# [reference: FluidsFunctions.xmcd]
# [reference: Sedimentation Tank.xmcd]
# [reference: Floc Hopper - New Design.xmcd]
# [reference: FCM.xmcd]
# [reference: Flocculator 3.xmcd]
# [reference: RapidMixer.xmcd]
# [reference: Materials List.xmcd]
# [reference: EntranceTankDim.xmcd]
Q_Plant = 22 L/s
# Sed Tanks and Slopes:
B_SedPort = 3.83765 cm  # Height of the narrowest part of the manifold ports
N_SedTanks = 3
W_SedPort = 3.83765 cm
H_SedBetween = 0 cm  # Distance from the top of the inlet manifold to the bottom of the ledge supporting the lamella frame
A_SedPort = 14.7275 cm^2  # Port Area
L_Sed = 3.01714 m
W_SedSludgeFlat = 5 cm  # Distance between tips of manifold plates (space alloted for the drain holes
N_SedBays = 3  # Number of bays of inlet manifolds in each sed tank
AN_SedTopInlet = 60 deg  # Angle of the top of the inlet manifold
L_SedPort = 4.43133 cm  # Length of the port through which water exits the inlet manifold
AN_SedBottom = 10 deg  # Angle of the bottom of inlet manifold
W_SedSlopePlate = 30 cm  # Width of ferrous cement plates in whice one manifold port is cut
Q_SedBay = 2.44444 L/s
W_SedBayActual = 0.9 m
L_SedSlopeManifold = 0.780718 m  # This is the extra distance between the last slope and the wall
# Sedimentation Tank Sludge Drain:
N_SedSludgeOrifices = 20  # per cell
Ti_SludgeDrain = 40 min  # Tank Drain time
W_SedSludge = 7.26101 cm  # Width of the sludge channel
B_SedSludgeOrifices = 15 cm  # Distance center to center between drain orifices
H_SedSludge = 3.6305 cm  # Depth of the sludge channel
T_SedSludge = 7.4641 cm
T_SedSludge = 7.4641 cm
# Thickness of the plate topping the sludge channel
# through which drain holes are formed
W_SedDrainCover = 19.2376 cm
D_SedSludgeOrifice = 0.009525 m  # Diameter of drain orifices
W_SedInletBottom = 0.353812 m
N_SedSludgeOrifices = 20
ND_SedSludgeValve = 2 in
# Sedimentation Tank Dimensions:
Z_SedSludge = 0.110946 m  # Height from 0 of the top of the sludge drain
H_SedBottomSlope = 0.0582718 m  # Height of the bottom slope
H_SedTopSlope = 0.676122 m  # Height of the top of the inlet manifold
Z_SedSlopes = 0.787068 m  # Height from 0 of the top of the inlet manifold
W_Sed = 3 m  # Total tank wall height
L_Sed = 3.01714 m  # Total tank length
# Inlet Channel:
HW_InletChannel = 0.376108 m  # Width of the drop chimneys connecting channel to sed inlet manifolds
W_InletChannel = 0.376108 m  # length of drop chimmneys
L_Channel = 9.6 m
W_SedManifoldEntrance = 0.187 m
L_SedManifoldEntrance = 0.201412 m
H_SedManifoldPort = 0.161032 m  # Ports at bottom of inlet chimney are set to be triangles
W_SedManifoldPort = 0.288759 m
N_SedInletPipes = 2  # per sed bay
H_InletChannel = 0.476108 m
# Sedimentation Tank Effluent Launder:
N_SedLaunderOrifices = 42  # Number of orifices per launder
Q_SedLaunderOrifices = 2.91005e-5 m^3/s  # More Launder Dimensions
ND_SedLaunder = 3 in
B_SedLaunderOrifices = 0.1 m  # Center to center launder spacing
L_SedLaunder = 2.18285 m
# Exit Channel:
D_SedLaunderOrifice = 0.3125 in
W_ExitChannel = 0.308184 m
H_ExitChannel = 0.476108 m
L_ExitChannel = 9.6 m
H_PltWeir = 0.281512 m  # height of the weir carrying water to the distribution tank
HW_ExitChannel = 0.336108 m  # water height in exit channel from 0
# Lamella:
L_SedPlate = 0.5 m
B_SedPlate = 1.96849 cm  # center to center distance between lamella
S_SedPlate = 1.7 cm  # spacing between lamella
N_SedPlates = 80  # Number of Sed Plates per Sedimentation Tank Bay.
AN_SedPlate = 60 deg
ZW_ExitChannel = 1.4755 m
V_SedC = 10.2117 m/day
L_SedActive = 1.50572 m
T
V_SedUp = 70 m/day
Z_SedLaunder = 1.43105 m
H_SedPlate = 0.433013 m
H_SedAbove = 0.1289 m  # Height of water needed above the lamella
N_SedPlates = 80
HW_Sed = 1.5155 m
H_Sed = 1.6155 m
Z_Mp = 1.13939 m
N_SedPorts = 8
H_SedBayDivider = 0.857068 m
W_SedSlopePlateRemaining = 0.617143 m
W_SedBayDivider = 0.15 m
# Sedimentation Tank Floc Hopper:
A_FlocHopper =  # error: This variable is undefined.
L_FlocHopper =  # error  # Length of the hopper cement plate
L_FlocHopperOffset =  # error  # distance from the edge of the channel to the bottom of the first lamella (collection distance)
W_FlocHopper =  # error  # width of the hopper set within each bay
# Flow Controller:
N_Fcm = 3
ID_FcmTube = 4.318 mm
ID_FcmTube = 0.17 in
L_FcmTube = 292.682 cm
Q_FcmTubeMax = 330 mL/min
HL_FcmValve = 20.2324 cm
# Flocculator: | Look at Flocculator Positioning arrays
W_FlocChannel = 0.45 m
# Fill last channel with bafffles from last channel
# Fix port width to be based on energy dissipation in that channel
ED_Floc = [20; 2] mW/kg
# Adjust spacing after the number of baffles per channel is known.
# Check the residence time of the flocculator should be at least 20minutes
HW_FlocEnd = 1.5155 m
X_FlocBaffles = [
    0.265714, 0.265714, 0.265714, 0.265714, 0.342143, 0.571429, 0.571429, 0.571429, 0.571429, 0.571429;
    0.571429, 0.571429, 0.571429, 0.571429, 0.724286, 1.18286, 1.18286, 1.18286, 1.18286, 1.18286;
    0.877143, 0.877143, 0.877143, 0.877143, 1.10643, 1.79429, 1.79429, 1.79429, 1.79429, 1.79429;
    1.18286, 1.18286, 1.18286, 1.18286, 1.48857, 2.40571, 2.40571, 2.40571, 2.40571, 2.40571;
    1.48857, 1.48857, 1.48857, 1.48857, 1.87071, 0, 0, 0, 0, 0;
    1.79429, 1.79429, 1.79429, 1.79429, 2.25286, 0, 0, 0, 0, 0;
    2.1, 2.1, 2.1, 2.1, 2.635, 0, 0, 0, 0, 0;
    2.40571, 2.40571, 2.40571, 2.40571, 0, 0, 0, 0, 0, 0;
    2.71143, 2.71143, 2.71143, 2.71143, 0, 0, 0, 0, 0, 0
] m
L_FlocBaffles = [
    340.637, 340.637, 340.637, 340.637, 340.561, 340.331, 340.331, 340.331, 340.331, 340.331;
    1.24979, 1.24979, 1.24979, 1.24979, 1.17336, 0.944072, 0.944072, 0.944072, 0.944072, 0.944072;
    340.637, 340.637, 340.637, 340.637, 340.561, 340.331, 340.331, 340.331, 340.331, 340.331;
    1.24979, 1.24979, 1.24979, 1.24979, 1.17336, 0.944072, 0.944072, 0.944072, 0.944072, 0.944072;
    340.637, 340.637, 340.637, 340.637, 340.561, 0, 0, 0, 0, 0;
    1.24979, 1.24979, 1.24979, 1.24979, 1.17336, 0, 0, 0, 0, 0;
    340.637, 340.637, 340.637, 340.637, 340.561, 0, 0, 0, 0, 0;
    1.24979, 1.24979, 1.24979, 1.24979, 0, 0, 0, 0, 0, 0;
    340.637, 340.637, 340.637, 340.637, 0, 0, 0, 0, 0, 0
] m
Z_FlocBaffles = [
    0, 0, 0, 0, 0, 0, 0, 0, 0, 0;
    0.265714, 0.265714, 0.265714, 0.265714, 0.342143, 0.571429, 0.571429, 0.571429, 0.571429, 0.571429;
    0, 0, 0, 0, 0, 0, 0, 0, 0, 0;
    0.265714, 0.265714, 0.265714, 0.265714, 0.342143, 0.571429, 0.571429, 0.571429, 0.571429, 0.571429;
    0, 0, 0, 0, 0, 0, 0, 0, 0, 0;
    0.265714, 0.265714, 0.265714, 0.265714, 0.342143, 0, 0, 0, 0, 0;
    0, 0, 0, 0, 0, 0, 0, 0, 0, 0;
    0.265714, 0.265714, 0.265714, 0.265714, 0, 0, 0, 0, 0, 0;
    0, 0, 0, 0, 0, 0, 0, 0, 0, 0
] m
N_FlocChannels = 10
L_FlocTank = 30.1714 m
HL_Floc = 33928.7 cm
HW_FlocStart = 340.803 m
S_FlocBaffle = [26.5714; 26.5714; 26.5714; 26.5714; 34.2143; 57.1429; 57.1429; 57.1429; 57.1429; 57.1429] cm
B_FlocBaffle = [30.5714; 30.5714; 30.5714; 30.5714; 38.2143; 61.1429; 61.1429; 61.1429; 61.1429; 61.1429] cm
N_FlocChannelBaffles = [9; 9; 9; 9; 7; 4; 4; 4; 4; 4]
W_FlocPort = [0.215714; 0.215714; 0.215714; 0.215714; 0.292143; 0.521429; 0.521429; 0.521429; 0.521429; 0.521429] m
HL_FlocChannels = [579363; 579363; 579363; 579363; 327585; 149568; 149568; 149568; 149568; 149568] cm
L_FlocBaffleLower = [1.24979; 1.24979; 1.24979; 1.24979; 1.17336; 0.944072; 0.944072; 0.944072; 0.944072; 0.944072] m
L_FlocBaffleUpper = [340.637; 340.637; 340.637; 340.637; 340.561; 340.331; 340.331; 340.331; 340.331; 340.331] m
H_FlocPort = [0.554305; 0.554305; 0.554305; 0.554305; 0.527017; 0.493151; 0.493151; 0.493151; 0.493151; 0.493151] m
Ti_Floc = 15.588 min  # residence time of the flocculator
N_FlocBaffles = 63
# Rapid Mix Unit and Entrance Tank:
L_Et = 1.64786 m
W_Et = 1.64786 m
H_Et = 341.203 m  # Height of Entrance Tank Orifice
W_EtOrifice[30] = 0.031 m
L_trueET[30] = 0.568761 m  # Length of Entrance Tank Orifice
Pi_EtFlow[30] = 0.278388  # Ratio of the minimum flow divided by the maximum flow through the plant.
L_FlocEntryOrifice = 45 cm  # Length of orifice entering into flocculator from Rapid Mix Unit
W_FlocEntryOrifice = 5.67501 cm  # Height of orifice entering into flocculator
ED_Diffusion =  # error  # Minimum Energy Dissipation needed
HL_FlocEntryOrifice = 5.64696 cm  # Head loss caused by entering flocculation tank.
A_FlocEntry = 0.0255375 m^2
A_EtOrifice = 176.316 cm^2
HW_EtTotal =  # error  # Total Height of water at beginning of rapid mix unit
HW_Channel2 =  # error  # Height of water at the back of the entrance tank channel (from channel bottom)
HW_EtChannel = 5.7687 cm  # Height of Waterfall into flocculator
W_EtChannel = 26.5714 cm  # Widt of entrance tank channel
Vol_Stock = 1782 L  # Volume of chemical stock tanks
ZW_ExitChannel = 1.4755 m  # Water Level at the end of the plant in the exit channel and exit channel box
HW_Sed = 1.5155 m
HW_FlocStart = 340.803 m  # Water level at the beginning of the floc tank
HL_Floc = 33928.7 cm  # just for ref. the head loss throught the floc tank
HW_EtTotal =  # error  # Height of the water in the entrance channel
# Materials List:
L_LaunderPipe =  # error
N_Launders = 18
L_LaunderPipeTotal = 39.2913 m
N_Valves = 9
N_LaunderCouplings = 18
N_ValveCouplings = 9
N_SedPlatesTotal = 720
N_SedPlatesPerSheet = 6
N_SedPlateSheets = 120
N_PipeSedPlateStand =  # error
A_SedTank = 31.8446 m^2
# [reference: AutoCADMasterProgram.xmcd]
# AutoCAD References
AC_SedTank = [
    "_-view o t"; "-layer m tank"; "c t 132,132,132"; "tank"; "  "; "_-view o t _zoom w 0.16,-0.16,0 -3.17714,3.16,1.6155 _box 0,0,0 -3.01714,3,1.6155 _box 0.15,-0.15,-0.15 -3.16714,3.15,1.6155 _subtract 0.15,-0.15,-0.15  0,0,0 "; "-layer s 0"; "  "; "-layer f tank"; "  "
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]
AC_EntranceTank = [
    "-layer m entrancetank";
    "c t 214,214,214";
    "entrancetank";
    "  ";
    "_-view o t _zoom w 0.16,15.29,0 -1.80786,17.25786,341.20288 _box 0,15.45,0 -1.64786,17.09786,341.20288 _box 0.15,15.3,-0.15 -1.79786,17.24786,341.20288 _subtract 0.15,15.3,-0.15  0,15.45,0 ";
    "-layer s 0";
    "  ";
    "-layer f entrancetank";
    "  ";
    "-layer s entrancetank";
    "  ";
    "_box -1.64786,15.3,341.15288 -1.38214,15.45,341.20288";
    "-layer s 0";
    "  ";
    "-layer t entrancetank";
    "  ";
    "_-view o t";
    "_subtract 0.15,15.45,0  -1.64786,15.3,341.15288 ";
    "-layer f entrancetank";
    "  "
]
AC_FlocTank = [
    "-layer m floctank"; "c t 91,91,91"; "floctank"; "  "; "_-view o t _zoom w 0.16,9.29,0 -3.17714,15.46,340.90288 _box 0,9.45,0 -3.01714,15.3,340.90288 _box 0.15,9.3,-0.15 -3.16714,15.45,340.90288 _subtract 0.15,9.3,-0.15  0,9.45,0 "; "-layer s 0"; "  "; "-layer f floctank"; "  "; "-layer m floctankwall"
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]
