# [reference: MasterProgram.xmcd]
# Automated Materials List
N_SedPlatesTotal := N_SedPlates*N_SedBays*N_SedTanks
N_SedPlatesPerSheet := floor(L_SedPlateSheet/L_SedPlate)
N_SedPlateSheets := ceil(N_SedPlatesTotal/N_SedPlatesPerSheet) = 93  # Total number of corrugated sheets needed to construct lamella/plate settlers
# This area is the area of the side of tank in plan view.
A_SedTank := (L_Sed + 2*T_PltWall)*(W_Sed*N_SedTanks + (N_SedTanks + 1)*T_PltWall) = 31.0602 m^2
A_FlocTank := (L_Sed + 2*T_PltWall)*(W_FlocChannel*N_FlocChannels + (N_FlocChannels - 1)*T_PltWall) = 16.6154 m^2
A_EntranceTank := (L_Et + T_PltWall)*(W_Et + 2*T_PltWall) = 3.2206 m^2
# Standard Cement
Vol_FlocTank := 2*(L_Sed + T_PlantWall)*T_PlantWall*H_Floc + 2*(W_FlocChannel*N_FlocChannels + N_FlocChannels*T_PlantWall)*T_PlantWall*H_Floc + A_FlocTank*T_PlantWall = 8688.01 L
Vol_InletChannel := (W_InletChannel*H_InletChannel*T_SedManifoldEntrance) + (W_InletChannel + 2*T_ChannelWall)*T_PlantWall*L_Channel + 2*(L_Channel*T_ChannelWall*H_InletChannel) - (A_SedManifoldEntrance*T_SedManifoldEntrance*N_SedInletPipes) = 803.519 L
# **Includes Sedimentation Manifold Entrance**
Vol_ExitChannel := (W_ExitChannel + 2*T_PlantWall)*T_PlantWall*H_ExitChannel + 2*(L_ExitChannel*T_ChannelWall*H_ExitChannel) = 503.056 L
# **Does not include inlet from sed tank and exit to storage tank**
Vol_SedTank := A_SedTank*T_PlantWall + 2*((L_Sed + T_PltWall)*T_PlantWall*H_Sed) + 2*(W_Sed*N_SedTanks + N_SedTanks*T_PltWall)*T_PlantWall*H_Sed - (A_SedSludge*L_Sed) = 10496 L
Vol_EntranceTank := 2*(W_Et + T_EtWall)*T_EtWall*H_Et + 2*(L_Et + T_EtWall)*T_EtWall*H_Et + A_EntranceTank*T_EtWall = 2724.49 L
# **basic dimensions - no grit chamber**
Vol_AlumStockTank := Q_AlumStockMax*Ti_StockMin
Vol_TotalWalls := Vol_EntranceTank + Vol_FlocTank + Vol_InletChannel + Vol_SedTank + Vol_ExitChannel = 23.2151 m^3
# Ferrous Cement
Vol_SedTankSlopes := T_SedSlopePlate*L_SedSlopeManifold*W_SedSlopePlate*N_SedPorts = 269.041 L
Vol_FlocBafflesTotal := W_FlocChannel*T_FlocBaffle*(L_FlocBaffleLower*ceil(N_FlocChannelBaffles/2) + L_FlocBaffleUpper*floor(N_FlocChannelBaffles/2))*N_FlocChannels = 4982.76 L
# Piping
N_Launders := N_SedTanks*N_SedBays*N_SedLaunders
L_LaunderPipeTotal := L_SedLaunder*N_Launders = 49.0743 m  # Total length of launder pipe
N_Valves := N_SedBays*N_SedTanks  # There are 2 sed inlet pipes per sed bay.
N_LaunderCouplings := N_Launders
N_ValveCouplings := N_Valves
N_PipeSedPlateFrame := W_Sed/B_PipeSedPlateFrame - 1 + L_Sed/B_PipeSedPlateFrame - 1  # error: This variable is undefined.
L_PipeSedPlateFrameTotal := N_SedTanks*((W_Sed/B_PipeSedPlateFrame - 1)*L_Sed + (L_Sed/B_PipeSedPlateFrame - 1)*W_Sed)  # error: This variable is undefined.
N_PipeSedPlateStand := L_SedLaunder/B_PipeSedPlateStand  # error: This variable is undefined.
L_PipeSedPlateStand := N_PipeSedPlateStand  # error: This variable is undefined.
L_RmPipe = 0.2 m
L_SedPipesTotal := □  # error: This placeholder is empty.
