# Sedimentation Tank
# Preliminary Dimension and Flow Calculations
# The minimum number of sed tanks is either 1,2,or 3 for very low flow rates. Then the
#
# first take the minimum of the 1,2,3 or the min number of sed tanks.
# then take the maximum of that number and the minimum number of double bay sed tanks required assuming that we are using the maximum manifold size possible.
N_SedTanks := fN_SedTanks(Q_Plant)
# Notes:
#
# 6 inch manifold is used until plant flow rate exceeds (max flow rate through 6 in pipe) x (min number of sed tanks). Then the number of sed tanks stays at min number of sed tanks (3) with one bay per tank until plant flow rate exceeds (max flow rate through 10 in pipe) x (min number of sed tanks). Then the number of sed bays per tank jumps up to 2 and the number of sed tanks stays at the min number of sed tanks until plant flow rate exceeds 2 x (max flow rate through 10 in pipe) x (min number of sed tanks). Then the number of sed bays per tank is set at 2 and the number of sed tanks is determined by rounding up Q.Plant/(2*Max flow through 10in pipe).
# Maximum length of the upflow section of the sed tank is based on the maximum flow rate through the inlet manifold pipe to stay below the maximum energy dissipation rate to prevent floc breakup and the desired upflow velocity to maintain a floc blanket.
Q_SedManifoldMax =  # error: This variable is undefined.
Q_Sed := fQ_Sed(Q_Plant)  # Flow rate through one sed tank.
N_SedBaysTotal := fN_SedBaysTotal(Q_Plant)
# There is a minimum number of total sed bays required to maintain the desired upflow velocity in each sed tank given the maximum length calculated above.
N_SedBaysMin := fN_SedBaysMin(Q_Plant)  # Minimum number of sed bays per sed tank given the minimum total number calculated above.
N_SedBays := fN_SedBays(Q_Plant)  # The number of bays per tank is the maximum of the calculated value and the user input
W_Sed := fW_Sed(Q_Plant)
Q_SedBay := fQ_SedBay(Q_Plant)
Q_SedManifold := fQ_SedBay  # There is one manifold per bay
ND_SedManifold := fND_SedManifold(Q_Plant)
L_SedUpflowEst := fL_SedUpflowEst(Q_Plant)
ND_SedLaunder := fND_SedLaunder(Q_Plant)
L_SedChannel := fL_SedChannel(Q_Plant)  # Length of the inlet channel, which runs along the entire width of the sed tanks.
HL_SedWeirExit := fHL_SedWeirExit(Q_Plant)
# The area of the inlet channel must be large enough not to break up flocs
A_SedInletChannelED := fA_SedInletChannelED(Q_Plant)
W_SedInletChannelPlumbing := fW_SedInletChannelPlumbing(Q_Plant)
HW_SedInletChannelPlumbing := fHW_SedInletChannelPlumbing(Q_Plant)
W_SedInletChannelPreWeir := fW_SedInletChannelPreWeir(Q_Plant)
HW_SedInletChannel := fHW_SedInletChannel(Q_Plant)
H_SedInletChannel := fH_SedInletChannel(Q_Plant)
EN_InletChannelGeom := fEN_InletChannelGeom(Q_Plant)
# This function determines the geometry of the weir based on the headloss through it. Hl.SedWeirMax is an expert input. 0-->Perpendicular, 1--> Parallel
W_SedWeirInlet := fW_SedWeirInlet(Q_Plant)
HL_SedWeirInlet := fHL_SedWeirInlet(Q_Plant)
H_SedWeirInlet := fH_SedWeirInlet(Q_Plant)
# The weir height should be set to maintain the same water depth in the inlet channel when the water is flowing over the weir.
W_SedInletChannelPostWeir := fW_SedInletChannelPostWeir(Q_Plant)
W_SedInletChannel := fW_SedInletChannel(Q_Plant)
V_SedInletChannel := fV_SedInletChannel(Q_Plant)  # This is the velocity in the part of the channel that delivers the flocs
ND_SedInletChannelDrain := fND_SedInletChannelDrain(Q_Plant)
W_SedInletChannelDrainBox := fW_SedInletChannelDrainBox(Q_Plant)
# Inlet Channel Design
# Outlet Pipe to Filter
L_FiEntrancePipeEst := fL_FiEntrancePipeEst(Q_Plant)  # The extra 1 meter is for the vertical section where the pipe drops down from the sed tank exit channel.
ND_FiEntrancePipeMax := fND_FiEntrancePipeMax(Q_Plant)
# Previously the size of the filter entrance pipe was calculated based solely on Q.Plant and would not calculate for higher flow rates; now the min function with the Q.PipeTotal calculation avoid that failure.
ND_FiEntrancePipe := fND_FiEntrancePipe(Q_Plant)
N_FiEntrancePipes := fN_FiEntrancePipes(Q_Plant)
Q_FiEntrancePipe := fQ_FiEntrancePipe(Q_Plant)
HL_FiEntrancePipe := h_l(Q_FiEntrancePipe, innerdiameter(ND_FiEntrancePipe, PS_Default), L_FiEntrancePipeEst, K_FiEntrancePipe, Nu_Water, E_Pvc)
# Exit Channel Design
ND_SedExitChannelDrain := fND_SedExitChannelDrain(Q_Plant)
H_SedExitChannel := H_SedInletChannel
HW_SedExitChannel := fHW_SedExitChannel(Q_Plant)
W_SedExitChannelPreWeir := fW_SedExitChannelPreWeir(Q_Plant)
W_SedExitChannelPostWeir := fW_SedExitChannelPostWeir(Q_Plant)
H_SedWeirExit := fH_SedWeirExit(Q_Plant)
W_SedExitChannel := fW_SedExitChannel(Q_Plant)
H_ExitChannelLaunder := fH_ExitChannelLaunder(Q_Plant)
W_SedExitChannelDrainBox := fW_SedExitChannelDrainBox(Q_Plant)
H_LamellaToLaunder := fH_LamellaToLaunder(Q_Plant)
L_SedUpflow := fL_SedUpflow(Q_Plant)
L_SedChannelToWall := fL_SedChannelToWall(Q_Plant)
N_SedPlates := fN_SedPlates(Q_Plant)
V_SedUp := fV_SedUp(Q_Plant)
# Upflow Length and Number of Plates
# Tank and Hopper Length
L_SedHopper := fL_SedHopper(Q_Plant)
L_Sed := fL_Sed(Q_Plant)
# This is the initial drain rate
# The factor of two is because the flow rate decreases linearly as the tank drain (for a constant cross section tank). Thus the average drain rate is 1/2 the initial drain rate.
Q_SedSludgeDrain := fQ_SedSludgeDrain(Q_Plant)
N_SedSludgeOrificesEst := fN_SedSludgeOrificesEst(Q_Plant)
Q_SedSludgeOrificesEst := fQ_SedSludgeOrificesEst(Q_Plant)
# This is the required diameter of the sludge drain if it were circular
D_SedSludgeChannel := fD_SedSludgeChannel(Q_Plant)
ND_SedSludgePipe := fND_SedSludgePipe(Q_Plant)
# To get the effective "diameter" of the sludge drain manifold (the cross section will actually be a polygon) an approximate length for the portion of the sludge drain which runs under the floc hopper is assumed to be 1m and is entered in the manifold function as if its section had inlet holes as well. Since the effect of the additional length on the calculated "diameter" is very small, the accuracy of these assumptions is not very important.
HL_SedSludgeEst := fHL_SedSludgeEst(Q_Plant)
HL_SedSludgeOrificeEst := fHL_SedSludgeOrificeEst(Q_Plant)
# Something is wrong with these diameter functions.
# The cross sectional area of the drain if it were circular
A_SedSludge := π/4*fA_SedSludge(Q_Plant)^2
# Assume sludge drain square to keep width of sludge drain cover narrow
W_SedSludge := fW_SedSludge(Q_Plant)
H_SedSludge := fH_SedSludge(Q_Plant)
Z_SedSludge := H_SedSludge  # Elevation of the top of the sludge drain channel (and the bottom of the drain cover).
# Sludge Drain
# Sludge Drain Cover
# The jet reverser is the semi-circular trough in the center of the drain cover into which the jets from the inlet manifold discharge and re-suspend sludge. The concrete semi-circle will be cast using a length of PVC pipe.
#
# Jet reverser diameter should be at least 2x the width of the diffuser port
W_SedDiffuserOutlet =  # error
ND_SedDiffuser =  # error
ND_SedJetReverser =  # error
S_ReversedHalfJet := (outerdiameter(ND_SedJetReverser) - W_SedDiffuserOutlet)/2 - (outerradius(ND_SedDiffuser) - innerdiameter(ND_SedDiffuser, PS_Default)/2)
# This is the space between the lip of the jet reverser and the outer wall of the diffuser pipe through which the reversed jet must pass. Compare with the natural width of the reversed jet calculated next.
W_SedJet := W_SedDiffuserOutlet/2*Pi_VenaContractaOrifice^2
T_SedDrainCoverLedge := fT_SedDrainCoverLedge(Q_Plant)
W_SedDrainCover := fW_SedDrainCover(Q_Plant)
# The drain cover needs to be wide enough to rest on the ledges of the drain channel, and also needs to be at least as wide as the jet reverser.
L_SedDrainCoverSlopes := fL_SedDrainCoverSlopes(Q_Plant)
H_SedDrainCoverTotal := fH_SedDrainCoverTotal(Q_Plant)
A_SedDrainCover := fA_SedDrainCover(Q_Plant)
L_SedDrainCoverTotal := fL_SedDrainCoverTotal(Q_Plant)
# L.SedDraincoverSegment should be modified so it is an integer number of manifold ports long.
L_SedDrainCoverSegmentMax := fL_SedDrainCoverSegmentMax(Q_Plant)
N_SedDrainCover := fN_SedDrainCover(Q_Plant)
L_SedDrainCoverSegment := fL_SedDrainCoverSegment(Q_Plant)
B_SedSludgeOrifices := fB_SedSludgeOrifices(Q_Plant)  # put an integer number of orifices in each drain cover segment
N_SedSludgeOrifices := fN_SedSludgeOrifices(Q_Plant)
D_SedSludgeOrifice := fD_SedSludgeOrifice(Q_Plant)  # No need to round this because they don't drill this hole in concrete!
N_SedDrainCoverSegmentOrifices := fN_SedDrainCoverSegmentOrifices(Q_Plant)
L_SedManifoldPipeActive := fL_SedManifoldPipeActive(Q_Plant)
# The width of the diffuser outlet is independent of the port spacing and thus can be calculated based on the flow per unit length of the diffuser pipe. There is a tiny inconsequential error introduced by the fact that the actual length of the slot is ultimately determined by an integer number of ports. It isn't worth correcting for that tiny error.
W_SedDiffuserOutlet := fW_SedDiffuserOutlet(Q_Plant)
# This is the amount of stretch we can get from the PVC pipe in the transition from round to rectangular. Large stretch factors are not possible to create without tearing the PVC.
W_SedDiffuserOutlet := 1 cm
ND_SedDiffuser := 1 in
OD_Diffuser := outerdiameter(ND_SedDiffuser)
Circ_SedDiffuser := π*innerdiameter(ND_SedDiffuser, PS_Default)  # This analysis doesn't account for thickness of the pipe wall
T_SedDiffuserWall := outerradius(ND_SedDiffuser) - innerdiameter(ND_SedDiffuser, PS_Default)/2
L_SedDiffuserOutlet := 5 cm - 2*T_SedDiffuserWall  # based on the mold
B_SedManifoldPort := L_SedDiffuserOutlet + 2*T_SedDiffuserWall
N_SedManifoldPorts := fN_SedManifoldPorts(Q_Plant)
# Subtracting two times the socket depth from the available length allows space for the manifold to be pulled out of its coupling without the diffusers running into the support ledge at the free end.
Q_SedManifoldPort := fQ_SedManifoldPort(Q_Plant)
D_Drill :=
    D_Drill ← D_DrillEng if EN_DrillSeries == 0
    D_Drill ← D_DrillMet otherwise  # Selects the proper drill series
D_SedManifoldPort := fD_SedManifoldPort(Q_Plant)
# We need enough length to give the jet that is coming out of the manifold port to expand to the size of the rectangular slot
V_SedManifoldPort := fV_SedManifoldPort(Q_Plant)
V_SedDiffuser := fV_SedDiffuser(Q_Plant)
V_SedManifoldPort/V_SedDiffuser =  # error
L_SedDiffuserRoundjetanalogy := fL_SedDiffuserRoundjetanalogy(Q_Plant)  # round jet equation
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L_SedDiffuserPlanejetanalogy := fL_SedDiffuserPlanejetanalogy(Q_Plant)
# plane jet
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L_SedManifoldDiffuser := fL_SedManifoldDiffuser(Q_Plant)
# Conclusion is that we should keep the manifold as high as possible based on the limitations of the elbow to give as much distance as possible for the jet to expand inside the diffuser pipe.
Z_SedManifoldPipe := fZ_SedManifoldPipe(Q_Plant)
# Inlet Manifold Design
# Side Slopes
W_SedSideSlopes := (W_SedBay - outerradius(ND_SedJetReverser))/2
H_SedSideSlopes := tan(AN_SedSlope)*W_SedSideSlopes
Z_SedSideSlopes := fZ_SedSideSlopes(Q_Plant)
# Plate Length
L_SedPlateActive := fL_SedPlateActive(Q_Plant)
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L_SedPlateEst := fL_SedPlateEst(Q_Plant)
N_PlatesPerSheet := fN_PlatesPerSheet(Q_Plant)
L_SedPlate := fL_SedPlate(Q_Plant)
L_Sed - L_SedUpflow - T_ConcreteMin - ConRadius(ND_SedManifold)/tan(AN_SedHopperSlope) - SocketDepth(ND_SedManifold) - S_Fitting - ConRadius(ND_SedManifold) =  # error
L_SedPlateUnderChan := fL_SedPlateUnderChan(Q_Plant)
V_SedActiveUp := fV_SedActiveUp(Q_Plant)
V_SedCaptureCheck := fV_SedCaptureCheck(Q_Plant)
# Floc Weir, Hopper, Hopper Drain, and Tank Height
Z_SedFlocWeir := fZ_SedFlocWeir(Q_Plant)
Z_SedLamellaBottomMin := fZ_SedLamellaBottomMin(Q_Plant)
Z_SedLaunderMin := fZ_SedLaunderMin(Q_Plant)
Z_SedChannelBottomMin := fZ_SedChannelBottomMin(Q_Plant)
# first determine if you need a coupling or not embedded in the channel, flush with the 45 elbow. If you need a coupling you might need to adjust the depth to accomodate the coupling
H_SedHopperAngleFit := fH_SedHopperAngleFit(Q_Plant)  # this is the available height for the angled components to fit in the hopper
H_SedHopperHeightNoCoupling := fH_SedHopperHeightNoCoupling(Q_Plant)
H_SedChanBottomTo45Est := fH_SedChanBottomTo45Est(Q_Plant)
EN_SedChannelCoupling := fEN_SedChannelCoupling(Q_Plant)
# this is the max height you can get without a coupling
Z_SedChannelBottom := fZ_SedChannelBottom(Q_Plant)
Z_SedLaunder := fZ_SedLaunder(Q_Plant)
Z_SedLamellaBottom := fZ_SedLamellaBottom(Q_Plant)
H_SedChanBottomTo45 := fH_SedChanBottomTo45(Q_Plant)
# determine the z of the channel elbow and x of the bottom 45
Z_SedManifoldPipe + ElbowRadius(ND_SedManifold)/sqrt(2)
Z_SedManElbow1 := fZ_SedManElbow1(Q_Plant)
Z_SedManPipeAngledBottom := fZ_SedManPipeAngledBottom(Q_Plant)
# this is the z of the angled manifold pipe
Z_SedManPipeAngledTop := fZ_SedManPipeAngledTop(Q_Plant)
X_SedManPipeAngledTop := fX_SedManPipeAngledTop(Q_Plant)
X_SedManPipeAngledBottom := fX_SedManPipeAngledBottom(Q_Plant)
L_SedMan45Pipe := fL_SedMan45Pipe(Q_Plant)
L_SedManifoldPipe := fL_SedManifoldPipe(Q_Plant)
H_SedFlocWeir := fH_SedFlocWeir(Q_Plant)
Z_SedWeirExit := fZ_SedWeirExit(Q_Plant)
H_Sed := fH_Sed(Q_Plant)
Z_SedManPipeAngledTop - Z_SedManPipeAngledBottom =  # error
Z_SedHopperBottom := fZ_SedHopperBottom(Q_Plant)
L_SedHopperBackSlope := fL_SedHopperBackSlope(Q_Plant)
H_SedHopperBackSlope := fH_SedHopperBackSlope(Q_Plant)
H_SedHopperFrontSlopeMax := fH_SedHopperFrontSlopeMax(Q_Plant)
L_SedHopperFrontSlopeMax := fL_SedHopperFrontSlopeMax(Q_Plant)
# Back slope will be flat if L_SedHopperFrontSlopeMax + L_SedHopperBackSlope < L_SedHopper - T_ConcreteMin
Z_SedHopperBackSlope := fZ_SedHopperBackSlope(Q_Plant)
H_SedHopperFrontSlope := fH_SedHopperFrontSlope(Q_Plant)
# the bottom of the hopper can be no lower
Z_SedHopperFrontSlope := fZ_SedHopperFrontSlope(Q_Plant)
L_SedHopperFrontSlope := fL_SedHopperFrontSlope(Q_Plant)
L_SedHopperFrontSlope - L_SedHopper + T_ConcreteMin
Z_SedHopperIntersect := fZ_SedHopperIntersect(Q_Plant)
X_SedHopperBottom := fX_SedHopperBottom(Q_Plant)
# Exit Launder
B_SedLaunderOrifices := B_SedLaunderOrificesEst
L_SedLaunder := fL_SedLaunder(Q_Plant)
N_SedLaunderOrifices := fN_SedLaunderOrifices(Q_Plant)
Q_SedLaunderOrifices := fQ_SedLaunderOrifices(Q_Plant)
# This the HL due to major & minor losses loses through the manifold.
HL_SedLaunderMajor := fHL_SedLaunderMajor(Q_Plant)
HL_SedLaunderOrificeEst := fHL_SedLaunderOrificeEst(Q_Plant)
D_SedLaunderOrifice := fD_SedLaunderOrifice(Q_Plant)
# This is the total headloss through the launder based on the actual diameter of the orifices
HL_SedLaunderOrifice := fHL_SedLaunderOrifice(Q_Plant)
HW_Sed := fHW_Sed(Q_Plant)
# Hopper Drain
Q_SedHopperDrainMax := fQ_SedHopperDrainMax(Q_Plant)
L_SedHopperDrainPipe := fL_SedHopperDrainPipe(Q_Plant)
# Module Design
N_SedPlates =  # error
L_SedPlate =  # error
N_SedModules := fN_SedModules(Q_Plant)
N_SedModulePlates := fN_SedModulePlates(Q_Plant)
# This part of the code serves to draw the module pipe for the plate settlers. In order to understand the meaning of each value please refer to the autocad drawing Lamina.Explanation
L_SedModulePipeIncrement := B_SedPlate - T_SedPlate - (CapDiameter(NominalPipeSize(ND_SedModulePipeSpacer))/2 - outerradius(NominalPipeSize(ND_SedModulePipeSpacer)))
L_SedModulePipe := fL_SedModulePipe(Q_Plant)
# This is the part of the pipe sticking out that the cap is fitted on. The cap will serve as a resting spot for the next module. The modules are identical so they can be interchangeable.
fS_SedModulePipes(Q_Plant) := max(L_SedPlate - 2*outerdiameter(ND_SedModulePipe) - 2*S_SedPlateModuleMin - (N_SedModulePlates*(T_SedPlate + (B_SedPlate - T_SedPlate)) - (B_SedPlate - T_SedPlate))/tan(AN_SedPlate), (L_SedModulePipe - L_SedModulePipeIncrement)*tan(90 deg - AN_SedPlate) + CapDiameter(NominalPipeSize(ND_SedModulePipeSpacer)))
# This is the length of a sed module pipe.
L_SedModulePipeCap := min(B_SedPlate - T_SedPlate, CapHeight(NominalPipeSize(ND_SedModulePipeSpacer)) - (CapDiameter(NominalPipeSize(ND_SedModulePipeSpacer))/2 - outerradius(NominalPipeSize(ND_SedModulePipeSpacer))))
# This is the actual spacing between the pipes.
# The cap should be as long as the spacing between the two modules. If it is longer, we will need to cut it accordingly.
S_SedPlateModule := fS_SedPlateModule(Q_Plant)
.
L_SedActive := fL_SedActive(Q_Plant)
# This is the new spacing between the bottom of the first plate settler in a module and the first pipe.
H_SedFrameStub := ((B_SedPlate - T_SedPlate)/sin(AN_SedPlate) - outerdiameter(ND_SedFrameStub))*tan(AN_SedPlate)
B_SedFrameStub := B_SedPlate/sin(AN_SedPlate)*N_SedModulePlates
# Plate Pipe Frame (not currently used)
# Residence Time Estimate
Vol_SedManifoldEst := (L_SedManifoldPipe + π/4*ElbowRadius(ND_SedManifold) + Z_SedChannelBottom - T_ChannelWall - Z_SedManifoldPipe - ElbowRadius(ND_SedManifold))*π*outerradius(ND_SedManifold)^2
Vol_SedPlatesEst := N_SedPlates*L_SedPlate*W_SedPlate*T_SedPlate
Vol_SedChannelsEst := W_SedBay*(W_SedInletChannel + T_ChannelWall)*(H_SedInletChannel + T_ChannelWall) + W_SedBay*(W_SedExitChannel + T_ChannelWall)*(H_SedExitChannel + T_ChannelWall)
Vol_SedBayEst := W_SedBay*L_Sed*HW_Sed - 1/2*L_SedHopper*H_SedHopperFrontSlope*W_SedBay - W_SedSideSlopes*H_SedSideSlopes*L_SedUpflow - Vol_SedManifoldEst - Vol_SedPlatesEst - Vol_SedChannelsEst
Ti_Sed := Vol_SedBayEst/Q_SedBay
H_WalkwayToTankWall := H_SedInletChannel
Z_Walkway := Plant_Origin[0] + H_Sed - H_WalkwayToTankWall
