# AguaClara Water Treatment Plants
# Automated Design
# References
# [reference: Channel design.xmcd]
# [reference: Chemical Feed.xmcd]
# [reference: Flocculation Function.xmcd]
# [reference: GritChamber.xmcd]
# [reference: HydraulicDesign.xmcd]
# [reference: Launder.xmcd]
# [reference: Plant Elevation Design.xmcd]
# [reference: plantleveltank.xmcd]
# [reference: Sedimentation Function.xmcd]
# User Inputs:
# Choose either a Pipe Schedule Number or an SDR rating:
# [component: outputs PipeSpecification]
# Engineer Entered Values: | Values used to Draw Plant:
tank_thick := 20 cm
lvltank_thick := 20 cm
# sed tank parameters
stockplat_thick := lvltank_thick
beta := 45 deg
grit_thick := lvltank_thick
SedTank_width := 42 in  # Width of the lamella
platform_thick := .5 m
# length of the lamella
channel_thick := 10 cm
L_lamella := 80 cm
lamella_spacing := 5 cm  # lamella spacing
walkway_width := 1 m
# grit chamber parameters
# Would you like to use Metric of English drill bits?
# [component: outputs DrillSeries]
# Calls Functions Here:
# Channel Design
Q_plant := 400*gpm = 1514.16 L/min
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Channel_dim := Channel(Q_plant, SedTank_width, tank_thick) = [3.6004; 0.759761; 0.7] m
# Sedimentation Tank Design
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SedTank := SedTankDesign(Q_plant, SedTank_width, lamella_spacing, L_lamella, beta, Channel_dim) = [[7.21289; 1.0668; 2.05952], 104, 1.95952, 1.35952, 12.6132]
# outputs:
[sedtank_dim/m, N_lamella, water_depth/m, z_plat/m, v_c*day/m]  # disabled
# Flocculator Design
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# The baffle positions are reported in the following way:
# There is one matrix for each channel. The first column is the x position
# of the baffle. The 2nd column is the starting y position of a baffle (ie top of the tank (0),
# or bottom of tank), the 3rd column is the final position of the baffle.
# Therefore a baffle at position x extends between the two y coordinates.
[floc_dim/m, baffle_spacing/m, floc_inleth/m, n_baffle, total_hl/m, uturnhole_dim/m, baffle_length/m, bafflepositions]  # disabled
Flocculator := flocculator(Q_plant, SedTank[:, 0][0]) = [[7.61289; 0.5334; 2.16544], [0.137773; 0.287957; 0.407233], 31, 0.105916, [0.257957; 0.84207], [1.75286; 1.52758; 1.34867], [[
    0.137773, 2.16544, 0.412576;
    0.275547, 0, 1.75286;
    0.41332, 2.16544, 0.412576;
    0.551094, 0, 1.75286;
    0.688867, 2.16544, 0.412576;
    0.826641, 0, 1.75286;
    0.964414, 2.16544, 0.412576;
    1.10219, 0, 1.75286;
    1.23996, 2.16544, 0.412576;
    1.37773, 0, 1.75286;
    1.51551, 2.16544, 0.412576;
    1.65328, 0, 1.75286;
    1.79105, 2.16544, 0.412576;
    1.92883, 0, 1.75286;
    2.0666, 2.16544, 0.412576;
    2.20437, 0, 1.75286;
    2.34215, 2.16544, 0.412576;
    2.47992, 0, 1.75286;
    2.61769, 2.16544, 0.412576;
    2.75547, 0, 1.75286;
    2.89324, 2.16544, 0.412576;
    3.03102, 0, 1.75286;
    3.31897, 2.16544, 0.412576
], [
    3.51849, 0, 1.52758;
    3.23053, 2.16544, 0.637852;
    2.94257, 0, 1.52758;
    2.65462, 2.16544, 0.637852;
    2.24738, 0, 1.52758;
    1.84015, 2.16544, 0.637852;
    1.43292, 0, 1.34867;
    0.548583, 2.16544, 0.816765
]], [[11420; 2595.45; 2076.36], 16091.8], 5.6925]  # error: This array index is invalid for this array.
3.319 - 3.031 = 0.288
2.247 - 1.84 = 0.407
# Chemical Feed Design
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1.102 - .964 = 0.138
.407 + .407 = 0.814
.549 - 1.433 = -0.884
1.84 - 1.433 = 0.407
.549 + .407 = 0.956
Q_alum := ChemicalFeed(Q_plant) = 757.082 mL/min
# Launderer Design
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Laund := Launder(Q_plant, PipeSpecification, SedTank[:, 0][0][0]*m, lamella_spacing, SedTank[:, 2][0]*m, SedTank[:, 5][0]*m)
[SedPipe_length/m, D_orifice/m, orifice_dist/m, manifold_depth/m, D_launder/m, n_orifices, HL_laundertotal/m]  # disabled
SedTank[:, 0][0][0]*m = 7.21289 m
lamella_spacing = 0.05 m
# Sludge Pipe Design
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SedTank[:, 5][0]*m =  # error: This array index is invalid for this array.
Q_plant = 1514.16 L/min
Launder(470*L/min, 8, 2.515*m, 0.05 m, 1.96 m, 0.267*m)
SludgePipe := Sludge(Q_plant, PipeSpecification, SedTank[:, 0][0][0]*m, lamella_spacing) = [0.161468, 0.00966757, 0.1] m
[waste_inr, D_orifice, orifice_dist]  # disabled
# Plant Leveling Tank
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PLT := PlantLevelingTank(Q_plant, PipeSpecification, Laund[:, 4][0]*m, Laund[:, 6][0]*m)
[lvltank_dim, D_weir, H_weir, HW_plantleveling]  # disabled
# Grit Chamber Design
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Grit := gritchamber(Q_plant, PipeSpecification, DrillSeries)
[grit_dim, n_risers, n_orifices, D_riser/m, D_orifice]  # disabled
# Plant Elevation Design
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Z_elevation := PlantElevations(Q_plant, Grit, Laund, SedTank, Q_alum, PLT[:, 2][0], PLT[:, 1][0], Flocculator[:, 4][0]*m, L_lamella, 10 cm)
# Constructing Tables of Parameters:
# Defining components of Output Arrays:
[sedtank_dim, N_lamella, water_depth, z_plat, v_c] := SedTank
[floc_dim, baffle_spacing, floc_inleth, n_baffle, total_hl, uturnhole_dim, baffle_length, baffleposition] := Flocculator
[SedPipe_length, D_laundOrf, lanudOrf_dist, manifold_depth, D_launder, n_laundOrf] := Laund
[waste_inr, D_sludgeOrf, sludgeOrf_dist] := SludgePipe/m
[lvltank_dim, D_weir, H_weir, HW_plantleveling] := PLT/m
[grit_dim, n_GritRisers, n_GritOrf, D_GritRiser, D_GritOrf] := Grit
# Defining components of Table Arrays:
headerrow := ["Parameter"; "Value"; "Units"]
Units := [" "; " meter per day"; "meter"; "meter"; " "; "meter"; "centimeter"; "meter"; "meter"; "inches"; " "; "inches"; "centimeter"; "meter"; "meter"; "meter"; "meter"; "meter"; "meter"; "centimeter"]
headercolumn := [
    "Number of lamella in sedimentation tanks";
    "critical velocity in sed tank";
    "height of the inlet to the flocc tank";
    "number of baffles in flocculator";
    "total headloss through flocculator";
    "length of the sedimentation inlet launder";
    "diameter of orifices in the launder";
    "distance between orifices in the launder";
    "depth of the launder below the water level";
    "diameter of the sedimentation inlet launder";
    "number of orifices in the launder";
    "diameter of sedimentation outlet sludge pipe";
    "diameter of orifices in sludge pipe";
    "distance between orifices in sludge pipe";
    "Diameter of weir in Plant Leveling Tank";
    "Height of weir in PLT";
    "Height of the Water in the PLt";
    "number of risers in grit chamber";
    "diameter of risers in grit chamber";
    "diameter of orifices in grit chamber"
]
Z := [
    N_lamella;
    v_c;
    floc_inleth;
    n_baffle;
    total_hl;
    SedPipe_length;
    D_laundOrf*m/cm;
    lanudOrf_dist;
    manifold_depth;
    D_launder*m/in;
    n_laundOrf;
    waste_inr*m/in;
    D_sludgeOrf*m/cm;
    sludgeOrf_dist;
    D_weir;
    H_weir;
    HW_plantleveling;
    n_GritRisers;
    D_GritRiser;
    D_GritOrf*m/cm
]
length(headercolumn) = 20
length(Z) =  # error: This variable is undefined.
table(headerrow, headercolumn, Z) :=
    for i ∈ 0 .. length(headercolumn)
        for j ∈ 0 .. last(headerrow)
            table[i, j] ← headerrow[j] if i == 0
            otherwise
                table[i, j] ← headercolumn[i - 1] if j == 0
                table[i, j] ← Z[i - 1] if j == 1
                table[i, j] ← Units[i - 1] if j == 2
    return table
headercolumn_Dim := [" Sedimentation Tank"; "Dimensions of Flocculator"; "Dimensions of Grit Chamber"; "Dimensions of Leveling Tank"; "Dimensions of Channel"]
headerrow_Dim := ["Component"; "Length"; "Width"; "Height"; "Units"]
Dim_y := [sedtank_dim[1]; floc_dim[1]; grit_dim[1]; lvltank_dim[1]; Channel_dim[1]/m]
Dim_z := [sedtank_dim[2]; floc_dim[1]; grit_dim[2]; lvltank_dim[2]; Channel_dim[2]/m]
Dim_x := [sedtank_dim[0]; floc_dim[0]; grit_dim[0]; lvltank_dim[0]; Channel_dim[0]/m]
Units2 := ["meter"; "meter"; "meter"; "meter"; "meter"]
tableDim(headerrow_Dim, headercolumn_Dim, Dim_x, Dim_y, Dim_z, Units2) :=
    for i ∈ 0 .. length(headercolumn_Dim)
        for j ∈ 0 .. last(headerrow_Dim)
            tableDim[i, j] ← headerrow_Dim[j] if i == 0
            otherwise
                tableDim[i, j] ← headercolumn_Dim[i - 1] if j == 0
                tableDim[i, j] ← Dim_x[i - 1] if j == 1
                tableDim[i, j] ← Dim_y[i - 1] if j == 2
                tableDim[i, j] ← Dim_z[i - 1] if j == 3
                tableDim[i, j] ← Units2[i - 1] if j == 4
    return tableDim
# Constructing Plant Elevation Tables:
headerrow_elevation := ["Element"; "Elevation from bottom of the sed tank (m)"; "Elevation from platform (m)"]
# top of alum stock tank
# port on alum stock tank
# bottom of alum stock tank
# alum platform height
# valve level in the FCM
# water level in the FCM
# end of the FCM tube at maximum alum dose
# grit chamber wall
# grit chamber maximum water level
# orifice elevation in the grit chamber
# horizontal pipe centerline where it leaves the grit chamber
# water level in rapid mix
# wall height for beginning of flocculator
# water level at beginning of flocculator
# wall height for the sedimentation tank
# water level in the sedimentation tank and channel
# top of the effluent launder
# top of the plate settlers
# bottom of the plate settlers
# platform height
# weir height
# level control water height
headercolumn_elevation := [
    "top of alum stock tank";
    "port on alum stock tank";
    "bottom of alum stock tank";
    "alum platform height";
    "valve level in the FCM";
    "water level in the FCM";
    "end of the FCM tube at maximum alum dose";
    "grit chamber wall";
    "grit chamber maximum water level";
    "orifice elevation in the grit chamber";
    "horizontal pipe centerline where it leaves the grit chamber";
    "water level in rapid mix";
    "wall height for beginning of flocculator";
    "water level at beginning of flocculator";
    "wall height for the sedimentation tank";
    "water level in the sedimentation tank and channel";
    "centerline of the effluent launder";
    "top of the plate settlers";
    "bottom of the plate settlers";
    "platform height";
    "weir height";
    "level control water height";
    "level control wall height"
]
tableElevation(headerrow_elevation, headercolumn_elevation, Z_elevation) :=
    for i ∈ 0 .. length(headercolumn_elevation)
        for j ∈ 0 .. last(headerrow_elevation)
            table[i, j] ← headerrow_elevation[j] if i == 0
            otherwise
                table[i, j] ← headercolumn_elevation[i - 1] if j == 0
                table[i, j] ← Z_elevation[i - 1] if j == 1
                table[i, j] ← Z_elevation[i - 1] - Z_elevation[22] if j == 2
    return table
# Tables:
# top
# [component: inputs table(headerrow, headercolumn, Z)]
# [component: inputs tableDim(headerrow_Dim, headercolumn_Dim, Dim_x, Dim_y, Dim_z, Units2)]
# [component: inputs tableElevation(headerrow_elevation, headercolumn_elevation, Z_elevation)]
