# Unit Processes Design
# References
# Fluids Functions
# [reference: FluidsFunctions.xmcd]
# Design Assumptions
# [reference: DesignAssumptions.xmcd]
# Hydraulic Design:
# [reference: HydraulicDesign.xmcd]
# Sedimentation Tank Design
SedTankDesign(Q_plant, SedTank_width, lamella_spacing, L_lamella, β, tank_thick) :=
    Q_tank ← Q_plant/n_sedtanks
    spacebelow_slanted ← (SedTank_width/2)*tan(β)
    spacebelow_straight ← spacebelow_total - spacebelow_slanted
    angle_toosteep ← "Failure: Slope of walls too steep (should be less than 60 deg)."
    return angle_toosteep if spacebelow_slanted > 1 m
    spaceabove ← ratio_waterdepthtolaunderspacing*SedTank_width
    H_lamella ← L_lamella*sin(α)
    H_tank ← H_lamella + spaceabove + spacebelow_total + freeboard_sed
    v_c ← v_up/(1 + L_lamella/lamella_spacing*cos(α)*sin(α))
    vc_toobig ← "Failure: Critical velocity is greater than the suggested value"
    return vc_toobig if v_c > criticalvelocity_toobig
    A_active ← Q_tank/v_up
    L_active ← A_active/SedTank_width
    L_tank ← (L_lamella*cos(α) + L_active)
    Channel_dim ← Channel(Q_plant, SedTank_width, tank_thick, n_sedtanks)
    Channel_width ← Channel_dim[1]
    N_lamella ← (L_active - Channel_width)/(lamella_spacing/sin(α))
    sedtank_vol ← 3*((SedTank_width*(H_tank - spacebelow_total)*L_tank) + .5*(SedTank_width*spacebelow_total*L_tank))
    sedtank_dim ← [L_tank; SedTank_width; H_tank]
    water_depth ← H_tank - freeboard_sed
    z_plat ← water_depth - HW_channel
    return [sedtank_dim/m, N_lamella, water_depth/m, z_plat/m, v_c*day/m]
# Flocculator Design
flocculator(Q_plant, SedTank_width, L_lamella, β, lamella_spacing, tank_thick) :=
    SedTankDim ← SedTankDesign(Q_plant, SedTank_width, lamella_spacing, L_lamella, β, tank_thick)[0, 0]*m
    FlocTank_length ← SedTankDim[0]*n_channels
    FlocTank_width ← SedTankDim[1]/n_channels
    FlocTank_enddepth ← SedTankDim[2] - freeboard_sed
    baffle_spacing ← (1/G)^(1/2)*(k_b*Q_plant^3/(2*Π_cell*ν*FlocTank_width^3))^(1/4)
    gap ← spacingratio*baffle_spacing
    G_min ← G*flowratio_hightolowflow^(3/2)
    θ_min ← Π_cell*FlocTank_width*baffle_spacing^2/Q_plant
    Gθ_minpersection ← Gθ_min*G_min/sum(G_min)
    n_baffle ← ceil(vectorize(Gθ_minpersection/(G_min*θ_min)))
    baffle_length ← FlocTank_enddepth - gap
    v ← Q_plant/(FlocTank_width*baffle_spacing)
    h_l ← vectorize(n_baffle*(k_b*v^2/(2*g)))
    total_hl ← sum(h_l)
    d_start ← FlocTank_enddepth + total_hl
    FlocTank_height ← d_start + freeboard_floc
    uturnhole_area ← baffle_spacing[2]*FlocTank_width
    uturnhole_width ← baffle_spacing[1] - uturnhole_unusedspace
    uturnhole_height ← uturnhole_area/uturnhole_width
    uturnhole_dim ← [uturnhole_width; uturnhole_height]
    baffle_overlap ← FlocTank_enddepth - 2*gap
    spacingratio_new ← (FlocTank_enddepth - overlap_min)/(2*baffle_spacing)
    i ← 0
    while i < length(baffle_spacing)
        baffle_length[i] ← FlocTank_enddepth - spacingratio_new[i]*baffle_spacing[i] if baffle_overlap[i] ≤ 0
        i ← i + 1
    baffle_newoverlap ← 2*baffle_length - FlocTank_enddepth
    floc_dim ← [FlocTank_length; FlocTank_width; FlocTank_height]
    floc_inleth ← 1.5 m
    return [floc_dim/m, baffle_spacing/m, floc_inleth/m, n_baffle, total_hl/m, uturnhole_dim/m]
flocculator(Q_plant, SedTank_width, L_lamella, β, lamella_spacing, tank_thick)
flocculator(740*L/min, 42 in, 1 m, 0 deg, 5 cm, 10 cm) = [[7.65917; 0.5334; 2.33744], [0.135435; 0.28307; 0.400322], 1.5, [22; 5; 3], 0.104715, [0.25307; 0.843764]]
# Chemical Feed Design
ChemicalFeed(Q_plant) :=
    Q_alum ← Q_plant*Al_maxdose/Al_stock
    return Q_alum
